# OpenSim document version 40500
InverseKinematicsTool generic:
  constraint_weight: Inf
  accuracy: 1e-5
  report_errors: true
  marker_file: keypoints_augmented.trc
  time_range: -Inf Inf
  report_marker_locations: false
  IKTaskSet:
    IKMarkerTask Nose: apply=true weight=5
    IKMarkerTask Neck: apply=true weight=5
    IKMarkerTask LShoulder: apply=true weight=10
    IKMarkerTask L_lelbow_study: apply=true weight=3
    IKMarkerTask RShoulder: apply=true weight=10
    IKMarkerTask r_lelbow_study: apply=true weight=3
    IKMarkerTask r_melbow_study: apply=true weight=3
    IKMarkerTask L_melbow_study: apply=true weight=3
    IKMarkerTask r_mwrist_study: apply=true weight=3
    IKMarkerTask L_mwrist_study: apply=true weight=3
    IKMarkerTask L_lwrist_study: apply=true weight=3
    IKMarkerTask REye: apply=true weight=5
    IKMarkerTask LEye: apply=true weight=5
    IKMarkerTask r_lwrist_study: apply=true weight=3
