# OpenSim document version 40500
Model MASI_HMaleMuscle:
  gravity: 0 -9.80665 0
  publications: List of publications related to model...
  length_units: meters
  force_units: N
  credits:
    Dario Cazzola and Grant Trewartha, University of Bath, Department for Health.
  Ground
  BodySet:
    Body pelvis: mass=11.777 [kg] mass_center=(-0.0707 0 0) inertia=(0.1028 0.0871 0.0579 0 0 0)
        meshes=(sacrum.vtp pelvis.vtp l_pelvis.vtp)
    Body spine: mass=0.5 mass_center=(0 0.222242 0) inertia=(0.01369 0.0041102 0.01369 0 0 0) meshes=tlspine.vtp
    Body lclavicle: mass=0.50426 mass_center=(-0.03 0.0167 -0.0983) inertia=(0.00024 0.00026 4e-5 -2e-5 -7e-5 5e-5)
        meshes=lclavicle.vtp
    Body lscapula: mass=2.437254 mass_center=(-0.0552994 -0.06105 0.0300854)
        inertia=(0.00124 0.00115 0.00137 0.00045 0.00041 0.00024) meshes=(lscapula.vtp scapula_lv.vtp)
    Body humerus_l: mass=2.0325 mass_center=(0 -0.164502 0) inertia=(0.011946 0.004121 0.013409 0 0 0)
        meshes=humerus_lv.vtp
    Body torso: mass=25.55 mass_center=(0.02 0.12 0) inertia=(1.67114 0.945824 1.67114 0 0 0) meshes=ribcage.vtp
    Body cerv7: mass=0.5840847 mass_center=(-0.0002 0.0071 0) inertia=(0.02 0.08 0.02 0 0 0) meshes=rotatedcerv7.vtp
    Body cerv6: mass=0.5077489 mass_center=(0.0002 0.0064 0) inertia=(0.02 0.08 0.02 0 0 0) meshes=cerv6.vtp
    Body cerv5: mass=0.4291 mass_center=(0.0001 0.0063 0) inertia=(0.02 0.08 0.02 0 0 0) meshes=cerv5.vtp
    Body cerv4: mass=0.4233168 mass_center=(-0.0003 0.0067 0) inertia=(0.02 0.08 0.02 0 0 0) meshes=cerv4.vtp
    Body cerv3: mass=0.419847 mass_center=(-0.0008 0.0071 0) inertia=(0.02 0.08 0.02 0 0 0) meshes=cerv3.vtp
    Body cerv2: mass=0.5875545 mass_center=(-0.001 0.0059 0) inertia=(0.02 0.08 0.02 0 0 0) meshes=cerv2.vtp
    Body cerv1: mass=0.4672677 mass_center=(0.0312 0.0019 0) inertia=(0.02 0.08 0.02 0 0 0) meshes=cerv1.vtp
    Body skull: mass=3.8 mass_center=(0 0.0676 0) inertia=(0.0263498 0.00809938 0.028416 0 0 0) meshes=skull.vtp
    Body jaw: mass=0.2 mass_center=(0 0.05 0) inertia=(0.04 0.02 0.04 0 0 0) meshes=jaw.vtp
    Body rclavicle: mass=0.50426 mass_center=(-0.03 0.0167 0.0983) inertia=(0.00024 0.00026 4e-5 -2e-5 -7e-5 5e-5)
        meshes=rclavicle.vtp
    Body rscapula: mass=2.437254 mass_center=(-0.0552994 -0.06105 -0.0300854)
        inertia=(0.00124 0.00115 0.00137 0.00045 0.00041 0.00024) meshes=(rscapula.vtp scapula_rv.vtp)
    Body humerus_r: mass=2.0325 mass_center=(0 -0.164502 0) inertia=(0.011946 0.004121 0.013409 0 0 0)
        meshes=humerus_rv.vtp
    Body ulna_l: mass=0.6075 mass_center=(0 -0.120525 0) inertia=(0.002962 0.000618 0.003213 0 0 0) meshes=ulna_lv.vtp
    Body radius_l: mass=0.6075 mass_center=(0 -0.120525 0) inertia=(0.002962 0.000618 0.003213 0 0 0)
        meshes=radius_lv.vtp
    Body hand_l: mass=0.4575 mass_center=(0 -0.068095 0) inertia=(0.000892 0.000547 0.00134 0 0 0)
        meshes=(pisiform_lvs.vtp lunate_lvs.vtp scaphoid_lvs.vtp triquetrum_lvs.vtp hamate_lvs.vtp capitate_lvs.vtp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)
    Body ulna_r: mass=0.6075 mass_center=(0 -0.120525 0) inertia=(0.002962 0.000618 0.003213 0 0 0) meshes=ulna_rv.vtp
    Body radius_r: mass=0.6075 mass_center=(0 -0.120525 0) inertia=(0.002962 0.000618 0.003213 0 0 0)
        meshes=radius_rv.vtp
    Body hand_r: mass=0.4575 mass_center=(0 -0.068095 0) inertia=(0.000892 0.000547 0.00134 0 0 0)
        meshes=(pisiform_rvs.vtp lunate_rvs.vtp scaphoid_rvs.vtp triquetrum_rvs.vtp hamate_rvs.vtp capitate_rvs.vtp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)
  JointSet:
    CustomJoint pelvisjnt: socket_parent_frame=ground_offset socket_child_frame=pelvis_offset
      Coordinate gndpitch: default_value=1.769299e-17 range=(-3.141593 3.141593) clamped=false
      Coordinate gndroll: default_value=-1.832514e-16 range=(-3.141593 3.141593) clamped=false
      Coordinate gndyaw: default_value=4.006268e-17 range=(-3.141593 3.141593) clamped=false
      Coordinate pelvis_tx: default_value=-2.996165e-12 range=(-5 5) clamped=false
      Coordinate pelvis_ty: default_value=1.15 range=(-1 2) clamped=false
      Coordinate pelvis_tz: default_value=-5.629243e-12 range=(-3 3) clamped=false
      PhysicalOffsetFrame ground_offset: socket_parent=/ground translation=(0.08 -0.173 0) [meters]
      PhysicalOffsetFrame pelvis_offset: socket_parent=/bodyset/pelvis translation=(0 0 0)
      SpatialTransform:
        TransformAxis rotation1: coordinates=gndpitch axis=(0 0 1) LinearFunction(coefficients=1 0)
        TransformAxis rotation2: coordinates=gndroll axis=(1 0 0) LinearFunction(coefficients=1 0)
        TransformAxis rotation3: coordinates=gndyaw axis=(0 1 0) LinearFunction(coefficients=1 0)
        TransformAxis translation1: coordinates=pelvis_tx axis=(1 0 0) LinearFunction(coefficients=1 0)
        TransformAxis translation2: coordinates=pelvis_ty axis=(0 1 0) LinearFunction(coefficients=1 0)
        TransformAxis translation3: coordinates=pelvis_tz axis=(0 0 1) LinearFunction(coefficients=1 0)
    CustomJoint spine_pelvis: socket_parent_frame=pelvis_offset socket_child_frame=spine_offset
      Coordinate spine_tilt: default_value=0 range=(-3.14159 3.14159) clamped=true
      Coordinate spine_list: default_value=0 range=(-3.14159 3.14159) clamped=true
      Coordinate spine_rotation: default_value=-3.85186e-34 range=(-3.14159 3.14159) clamped=true
      PhysicalOffsetFrame pelvis_offset: socket_parent=/bodyset/pelvis translation=(-0.08 0 0)
      PhysicalOffsetFrame spine_offset: socket_parent=/bodyset/spine translation=(0 0 0)
      SpatialTransform: axes_held_at_zero=(translation1 translation2 translation3)
        TransformAxis rotation1: coordinates=spine_tilt axis=(0 0 1) LinearFunction(coefficients=1 0)
        TransformAxis rotation2: coordinates=spine_list axis=(1 0 0) LinearFunction(coefficients=1 0)
        TransformAxis rotation3: coordinates=spine_rotation axis=(0 1 0) LinearFunction(coefficients=1 0)
    CustomJoint auxSTERNljnt: socket_parent_frame=spine_offset socket_child_frame=lclavicle_offset
      Coordinate auxSTERNljnt_r1: default_value=0.1844375 range=(-1.570796 1.570796) clamped=false
      Coordinate auxSTERNljnt_r2: default_value=0.4038863 range=(-1.570796 1.570796) clamped=false
      Coordinate auxSTERNljnt_r3: default_value=0.009392337 range=(-1.570796 1.570796) clamped=false
      PhysicalOffsetFrame spine_offset: socket_parent=/bodyset/spine translation=(-0.0118 0.5083 -0.022)
          orientation=(-0.02 -0.13 -0.1) [radians]
      PhysicalOffsetFrame lclavicle_offset: socket_parent=/bodyset/lclavicle translation=(0 0 0)
          orientation=(0.2 0.4 0)
      SpatialTransform: axes_held_at_zero=(translation1 translation2 translation3)
        TransformAxis rotation1: coordinates=auxSTERNljnt_r1 axis=(1 0 0) LinearFunction(coefficients=1 0)
        TransformAxis rotation2: coordinates=auxSTERNljnt_r2 axis=(0 1 0) LinearFunction(coefficients=1 0)
        TransformAxis rotation3: coordinates=auxSTERNljnt_r3 axis=(0 0 1) LinearFunction(coefficients=1 0)
    CustomJoint auxSCAPljnt: socket_parent_frame=lclavicle_offset socket_child_frame=lscapula_offset
      Coordinate rollLSCA: default_value=0.9203432 range=(-1.570796 1.570796) clamped=true
      Coordinate pitchLSCA: default_value=-0.2042049 range=(-1.570796 1.570796) clamped=true
      Coordinate yawLSCA: default_value=0.007365471 range=(-1.570796 1.570796) clamped=true
      PhysicalOffsetFrame lclavicle_offset: socket_parent=/bodyset/lclavicle translation=(-0.065 -0.02 -0.14)
          orientation=(-0.78 0.3 0.14)
      PhysicalOffsetFrame lscapula_offset: socket_parent=/bodyset/lscapula translation=(-0.03 -0.055 0.008)
          orientation=(0.45 -1 0.1)
      SpatialTransform: axes_held_at_zero=(translation1 translation3)
        TransformAxis rotation1: coordinates=rollLSCA axis=(1 0 0) LinearFunction(coefficients=1 0.0106)
        TransformAxis rotation2: coordinates=pitchLSCA axis=(0 -1 0) LinearFunction(coefficients=-1 0.7)
        TransformAxis rotation3: coordinates=yawLSCA axis=(0 0 1) LinearFunction(coefficients=1 -0.03888)
        TransformAxis translation2: axis=(0 1 0) LinearFunction(coefficients=0)
    CustomJoint acromial_l: socket_parent_frame=lscapula_offset socket_child_frame=humerus_l_offset
      Coordinate arm_flex_l: default_value=2.59279e-7 range=(-0.34889 2.792527) clamped=true
      Coordinate arm_add_l: default_value=2.368023e-8 range=(-2.61667 1.570796) clamped=true
      Coordinate arm_rot_l: default_value=-2.115039e-7 range=(-1.570796 2.792527) clamped=true
      PhysicalOffsetFrame lscapula_offset: socket_parent=/bodyset/lscapula translation=(-0.009 -0.04 -0.02)
          orientation=(0.3 -0.3 0.3)
      PhysicalOffsetFrame humerus_l_offset: socket_parent=/bodyset/humerus_l translation=(0 0 0)
      SpatialTransform: axes_held_at_zero=(translation1 translation2 translation3)
        TransformAxis rotation1: coordinates=arm_flex_l axis=(0 0 1) LinearFunction(coefficients=1 0)
        TransformAxis rotation2: coordinates=arm_add_l axis=(-1 0 0) LinearFunction(coefficients=1 0)
        TransformAxis rotation3: coordinates=arm_rot_l axis=(0 -1 0) LinearFunction(coefficients=1 0)
    WeldJoint ribcagejnt: socket_parent_frame=spine_offset socket_child_frame=torso_offset
      PhysicalOffsetFrame spine_offset: socket_parent=/bodyset/spine translation=(0 0.173 0)
      PhysicalOffsetFrame torso_offset: socket_parent=/bodyset/torso translation=(0 0 0)
    CustomJoint auxt1jnt: socket_parent_frame=spine_offset socket_child_frame=cerv7_offset
      Coordinate pitch2: default_value=1.192285e-6 range=(-0.5759587 0.837758) clamped=true
      Coordinate roll2: default_value=-7.417425e-34 range=(-0.5759587 0.5759587) clamped=true
      Coordinate yaw2: default_value=-1.940732e-33 range=(-0.4712389 0.4712389) clamped=true
      PhysicalOffsetFrame spine_offset: socket_parent=/bodyset/spine translation=(-0.0475 0.5343 0)
      PhysicalOffsetFrame cerv7_offset: socket_parent=/bodyset/cerv7 translation=(0.00684 -0.005655 0)
      SpatialTransform: axes_held_at_zero=(translation1 translation2 translation3)
        TransformAxis rotation1: coordinates=pitch2 axis=(0 0 1)
          SimmSpline: x=(-1.74533 1.74533) y=(-0.172788 0.172788)
        TransformAxis rotation2: coordinates=roll2 axis=(1 0 0)
          SimmSpline: x=(-1.74533 1.74533) y=(-0.136136 0.136136)
        TransformAxis rotation3: coordinates=yaw2 axis=(0 1 0)
          SimmSpline: x=(-1.74533 1.74533) y=(-0.109956 0.109956)
    CustomJoint aux7jnt: socket_parent_frame=cerv7_offset socket_child_frame=cerv6_offset
      Coordinate aux7jnt_r3: default_value=2.229575e-7 range=(-99999.9 99999.9) clamped=false
      Coordinate aux7jnt_r1: default_value=0 range=(-99999.9 99999.9) clamped=false
      Coordinate aux7jnt_r2: default_value=0 range=(-99999.9 99999.9) clamped=false
      PhysicalOffsetFrame cerv7_offset: socket_parent=/bodyset/cerv7 translation=(0.013256 0.01238 0)
      PhysicalOffsetFrame cerv6_offset: socket_parent=/bodyset/cerv6 translation=(0.009419 -0.004065 0)
      SpatialTransform: axes_held_at_zero=(translation1 translation2 translation3)
        TransformAxis rotation1: coordinates=aux7jnt_r3 axis=(0 0 1) LinearFunction(coefficients=1 0)
        TransformAxis rotation2: coordinates=aux7jnt_r1 axis=(1 0 0) LinearFunction(coefficients=1 0)
        TransformAxis rotation3: coordinates=aux7jnt_r2 axis=(0 1 0) LinearFunction(coefficients=1 0)
    CustomJoint aux6jnt: socket_parent_frame=cerv6_offset socket_child_frame=cerv5_offset
      Coordinate aux6jnt_r3: default_value=2.623023e-7 range=(-99999.9 99999.9) clamped=false
      Coordinate aux6jnt_r1: default_value=0 range=(-99999.9 99999.9) clamped=false
      Coordinate aux6jnt_r2: default_value=0 range=(-99999.9 99999.9) clamped=false
      PhysicalOffsetFrame cerv6_offset: socket_parent=/bodyset/cerv6 translation=(0.00985 0.00975 0)
      PhysicalOffsetFrame cerv5_offset: socket_parent=/bodyset/cerv5 translation=(0.00567 -0.00815 0)
      SpatialTransform: axes_held_at_zero=(translation1 translation2 translation3)
        TransformAxis rotation1: coordinates=aux6jnt_r3 axis=(0 0 1) LinearFunction(coefficients=1 0)
        TransformAxis rotation2: coordinates=aux6jnt_r1 axis=(1 0 0) LinearFunction(coefficients=1 0)
        TransformAxis rotation3: coordinates=aux6jnt_r2 axis=(0 1 0) LinearFunction(coefficients=1 0)
    CustomJoint aux5jnt: socket_parent_frame=cerv5_offset socket_child_frame=cerv4_offset
      Coordinate aux5jnt_r3: default_value=2.623023e-7 range=(-99999.9 99999.9) clamped=false
      Coordinate aux5jnt_r1: default_value=0 range=(-99999.9 99999.9) clamped=false
      Coordinate aux5jnt_r2: default_value=0 range=(-99999.9 99999.9) clamped=false
      PhysicalOffsetFrame cerv5_offset: socket_parent=/bodyset/cerv5 translation=(0.00843 0.00745 0)
      PhysicalOffsetFrame cerv4_offset: socket_parent=/bodyset/cerv4 translation=(0.00502 -0.01172 0)
      SpatialTransform: axes_held_at_zero=(translation1 translation2 translation3)
        TransformAxis rotation1: coordinates=aux5jnt_r3 axis=(0 0 1) LinearFunction(coefficients=1 0)
        TransformAxis rotation2: coordinates=aux5jnt_r1 axis=(1 0 0) LinearFunction(coefficients=1 0)
        TransformAxis rotation3: coordinates=aux5jnt_r2 axis=(0 1 0) LinearFunction(coefficients=1 0)
    CustomJoint aux4jnt: socket_parent_frame=cerv4_offset socket_child_frame=cerv3_offset
      Coordinate aux4jnt_r3: default_value=1.967267e-7 range=(-99999.9 99999.9) clamped=false
      Coordinate aux4jnt_r1: default_value=0 range=(-99999.9 99999.9) clamped=false
      Coordinate aux4jnt_r2: default_value=0 range=(-99999.9 99999.9) clamped=false
      PhysicalOffsetFrame cerv4_offset: socket_parent=/bodyset/cerv4 translation=(0.00732 0.00638 0)
      PhysicalOffsetFrame cerv3_offset: socket_parent=/bodyset/cerv3 translation=(0.00471 -0.00902 0)
      SpatialTransform: axes_held_at_zero=(translation1 translation2 translation3)
        TransformAxis rotation1: coordinates=aux4jnt_r3 axis=(0 0 1) LinearFunction(coefficients=1 0)
        TransformAxis rotation2: coordinates=aux4jnt_r1 axis=(1 0 0) LinearFunction(coefficients=1 0)
        TransformAxis rotation3: coordinates=aux4jnt_r2 axis=(0 1 0) LinearFunction(coefficients=1 0)
    CustomJoint aux3jnt: socket_parent_frame=cerv3_offset socket_child_frame=cerv2_offset
      Coordinate aux3jnt_r3: default_value=1.311512e-7 range=(-99999.9 99999.9) clamped=false
      Coordinate aux3jnt_r1: default_value=0 range=(-99999.9 99999.9) clamped=false
      Coordinate aux3jnt_r2: default_value=0 range=(-99999.9 99999.9) clamped=false
      PhysicalOffsetFrame cerv3_offset: socket_parent=/bodyset/cerv3 translation=(0.00525 0.00506 0)
      PhysicalOffsetFrame cerv2_offset: socket_parent=/bodyset/cerv2 translation=(0.00543 -0.01123 0)
      SpatialTransform: axes_held_at_zero=(translation1 translation2 translation3)
        TransformAxis rotation1: coordinates=aux3jnt_r3 axis=(0 0 1) LinearFunction(coefficients=1 0)
        TransformAxis rotation2: coordinates=aux3jnt_r1 axis=(1 0 0) LinearFunction(coefficients=1 0)
        TransformAxis rotation3: coordinates=aux3jnt_r2 axis=(0 1 0) LinearFunction(coefficients=1 0)
    CustomJoint aux2jnt: socket_parent_frame=cerv2_offset socket_child_frame=cerv1_offset
      Coordinate pitch1: default_value=1.578132e-6 range=(-0.2792527 0.418879) clamped=true
      Coordinate roll1: default_value=-1.889405e-33 range=(-0.1047198 0.1047198) clamped=true
      Coordinate yaw1: default_value=1.274842e-34 range=(-0.6632251 0.6632251) clamped=true
      PhysicalOffsetFrame cerv2_offset: socket_parent=/bodyset/cerv2 translation=(0.00689 0.02128 0)
      PhysicalOffsetFrame cerv1_offset: socket_parent=/bodyset/cerv1 translation=(0.04245 0.00352 0)
      SpatialTransform: axes_held_at_zero=(translation1 translation2 translation3)
        TransformAxis rotation1: coordinates=pitch1 axis=(0 0 1)
          SimmSpline: x=(-1.74533 1.74533) y=(-0.774926 0.774926)
        TransformAxis rotation2: coordinates=roll1 axis=(1 0 0)
          SimmSpline: x=(-1.74533 1.74533) y=(-0.872665 0.872665)
        TransformAxis rotation3: coordinates=yaw1 axis=(0 1 0)
          SimmSpline: x=(-1.74533 1.74533) y=(-1.5516 1.5516)
    CustomJoint aux1jnt: socket_parent_frame=cerv1_offset socket_child_frame=skull_offset
      Coordinate aux1jnt_r3: default_value=8.774408e-7 range=(-99999.9 99999.9) clamped=false
      Coordinate aux1jnt_r1: default_value=0 range=(-99999.9 99999.9) clamped=false
      Coordinate aux1jnt_r2: default_value=0 range=(-99999.9 99999.9) clamped=false
      PhysicalOffsetFrame cerv1_offset: socket_parent=/bodyset/cerv1 translation=(0.04335 0.01492 0)
      PhysicalOffsetFrame skull_offset: socket_parent=/bodyset/skull translation=(0 0 0)
      SpatialTransform: axes_held_at_zero=(translation1 translation2 translation3)
        TransformAxis rotation1: coordinates=aux1jnt_r3 axis=(0 0 1) LinearFunction(coefficients=1 0)
        TransformAxis rotation2: coordinates=aux1jnt_r1 axis=(1 0 0) LinearFunction(coefficients=1 0)
        TransformAxis rotation3: coordinates=aux1jnt_r2 axis=(0 1 0) LinearFunction(coefficients=1 0)
    WeldJoint jawjnt: socket_parent_frame=skull_offset socket_child_frame=jaw_offset
      PhysicalOffsetFrame skull_offset: socket_parent=/bodyset/skull translation=(0 0 0)
      PhysicalOffsetFrame jaw_offset: socket_parent=/bodyset/jaw translation=(0 0 0)
    CustomJoint auxSTERNrjnt: socket_parent_frame=spine_offset socket_child_frame=rclavicle_offset
      Coordinate auxSTERNrjnt_r1: default_value=0.1844375 range=(-1.570796 1.570796) clamped=false
      Coordinate auxSTERNrjnt_r2: default_value=0.4038863 range=(-1.570796 1.570796) clamped=false
      Coordinate auxSTERNrjnt_r3: default_value=0.00939234 range=(-1.570796 1.570796) clamped=false
      PhysicalOffsetFrame spine_offset: socket_parent=/bodyset/spine translation=(-0.0118 0.5083 0.022)
          orientation=(0.02 0.13 -0.1)
      PhysicalOffsetFrame rclavicle_offset: socket_parent=/bodyset/rclavicle translation=(0 0 0)
          orientation=(-0.2 -0.4 0)
      SpatialTransform: axes_held_at_zero=(translation1 translation2 translation3)
        TransformAxis rotation1: coordinates=auxSTERNrjnt_r1 axis=(-1 0 0) LinearFunction(coefficients=1 0)
        TransformAxis rotation2: coordinates=auxSTERNrjnt_r2 axis=(0 -1 0) LinearFunction(coefficients=1 0)
        TransformAxis rotation3: coordinates=auxSTERNrjnt_r3 axis=(0 0 1) LinearFunction(coefficients=1 0)
    CustomJoint auxSCAPrjnt: socket_parent_frame=rclavicle_offset socket_child_frame=rscapula_offset
      Coordinate rollRSCA: default_value=0.9203432 range=(-1.570796 1.570796) clamped=true
      Coordinate pitchRSCA: default_value=-0.2042049 range=(-1.570796 1.570796) clamped=true
      Coordinate yawRSCA: default_value=0.007365473 range=(-1.570796 1.570796) clamped=true
      PhysicalOffsetFrame rclavicle_offset: socket_parent=/bodyset/rclavicle translation=(-0.065 -0.02 0.14)
          orientation=(0.78 -0.3 0.14)
      PhysicalOffsetFrame rscapula_offset: socket_parent=/bodyset/rscapula translation=(-0.03 -0.055 -0.008)
          orientation=(-0.45 1 0.1)
      SpatialTransform: axes_held_at_zero=(translation1 translation3)
        TransformAxis rotation1: coordinates=rollRSCA axis=(1 0 0) LinearFunction(coefficients=-1 -0.0106)
        TransformAxis rotation2: coordinates=pitchRSCA axis=(0 -1 0) LinearFunction(coefficients=1 -0.7)
        TransformAxis rotation3: coordinates=yawRSCA axis=(0 0 1) LinearFunction(coefficients=1 -0.03888)
        TransformAxis translation2: axis=(0 1 0) LinearFunction(coefficients=0)
    CustomJoint acromial_r: socket_parent_frame=rscapula_offset socket_child_frame=humerus_r_offset
      Coordinate arm_flex_r: default_value=5.81598e-9 range=(-0.34889 2.792527) clamped=true
      Coordinate arm_add_r: default_value=1.74281e-7 range=(-2.61667 1.570796) clamped=true
      Coordinate arm_rot_r: default_value=-2.115039e-7 range=(-1.570796 2.792527) clamped=true
      PhysicalOffsetFrame rscapula_offset: socket_parent=/bodyset/rscapula translation=(-0.009 -0.04 0.02)
          orientation=(-0.3 0.3 0.3)
      PhysicalOffsetFrame humerus_r_offset: socket_parent=/bodyset/humerus_r translation=(0 0 0)
      SpatialTransform: axes_held_at_zero=(translation1 translation2 translation3)
        TransformAxis rotation1: coordinates=arm_flex_r axis=(0 0 1) LinearFunction(coefficients=1 0)
        TransformAxis rotation2: coordinates=arm_add_r axis=(1 0 0) LinearFunction(coefficients=1 0)
        TransformAxis rotation3: coordinates=arm_rot_r axis=(0 1 0) LinearFunction(coefficients=1 0)
    CustomJoint elbow_l: socket_parent_frame=humerus_l_offset socket_child_frame=ulna_l_offset
      Coordinate elbow_flex_l: default_value=8.992902e-5 range=(0 2.618) clamped=true
      PhysicalOffsetFrame humerus_l_offset: socket_parent=/bodyset/humerus_l translation=(0.013144 -0.31098 0.009595)
      PhysicalOffsetFrame ulna_l_offset: socket_parent=/bodyset/ulna_l translation=(0 0 0)
      SpatialTransform: axes_held_at_zero=(rotation2 rotation3 translation1 translation2 translation3)
        TransformAxis rotation1: coordinates=elbow_flex_l axis=(-0.226047 -0.022269 0.9738618)
            LinearFunction(coefficients=1 0)
    CustomJoint radioulnar_l: socket_parent_frame=ulna_l_offset socket_child_frame=radius_l_offset
      Coordinate pro_sup_l: default_value=3.054878e-10 range=(-2.094395 3.141593) clamped=true
      PhysicalOffsetFrame ulna_l_offset: socket_parent=/bodyset/ulna_l translation=(-0.006727 -0.0128533 -0.026083)
      PhysicalOffsetFrame radius_l_offset: socket_parent=/bodyset/radius_l translation=(0 0 0)
      SpatialTransform: axes_held_at_zero=(rotation2 rotation3 translation1 translation2 translation3)
        TransformAxis rotation1: coordinates=pro_sup_l axis=(-0.05639803 -0.9984065 0.001952)
            LinearFunction(coefficients=1 0)
    CustomJoint radius_hand_l: socket_parent_frame=radius_l_offset socket_child_frame=hand_l_offset
      Coordinate wrist_flex_l: default_value=0 range=(-1.22173 1.22173) clamped=true
      Coordinate wrist_dev_l: default_value=1.334961e-9 range=(-0.4363323 0.6108652) clamped=true
      PhysicalOffsetFrame radius_l_offset: socket_parent=/bodyset/radius_l translation=(-0.008797 -0.233053 -0.01361)
      PhysicalOffsetFrame hand_l_offset: socket_parent=/bodyset/hand_l translation=(0 0 0)
      SpatialTransform: axes_held_at_zero=(rotation3 translation1 translation2 translation3)
        TransformAxis rotation1: coordinates=wrist_flex_l axis=(0 0 1) LinearFunction(coefficients=1 0)
        TransformAxis rotation2: coordinates=wrist_dev_l axis=(-1 0 0) LinearFunction(coefficients=1 0)
    CustomJoint elbow_r: socket_parent_frame=humerus_r_offset socket_child_frame=ulna_r_offset
      Coordinate elbow_flex_r: default_value=9.708936e-5 range=(0 2.618) clamped=true
      PhysicalOffsetFrame humerus_r_offset: socket_parent=/bodyset/humerus_r translation=(0.013144 -0.31098 -0.009595)
      PhysicalOffsetFrame ulna_r_offset: socket_parent=/bodyset/ulna_r translation=(0 0 0)
      SpatialTransform: axes_held_at_zero=(rotation2 rotation3 translation1 translation2 translation3)
        TransformAxis rotation1: coordinates=elbow_flex_r axis=(0.226047 0.022269 0.9738618)
            LinearFunction(coefficients=1 0)
    CustomJoint radioulnar_r: socket_parent_frame=ulna_r_offset socket_child_frame=radius_r_offset
      Coordinate pro_sup_r: default_value=2.702932e-10 range=(-2.094395 3.141593) clamped=true
      PhysicalOffsetFrame ulna_r_offset: socket_parent=/bodyset/ulna_r translation=(-0.006727 -0.0128533 0.026083)
      PhysicalOffsetFrame radius_r_offset: socket_parent=/bodyset/radius_r translation=(0 0 0)
      SpatialTransform: axes_held_at_zero=(rotation2 rotation3 translation1 translation2 translation3)
        TransformAxis rotation1: coordinates=pro_sup_r axis=(0.05639803 0.9984065 0.001952)
            LinearFunction(coefficients=1 0)
    CustomJoint radius_hand_r: socket_parent_frame=radius_r_offset socket_child_frame=hand_r_offset
      Coordinate wrist_flex_r: default_value=0 range=(-1.22173 1.22173) clamped=true
      Coordinate wrist_dev_r: default_value=1.004252e-9 range=(-0.4363323 0.6108652) clamped=true
      PhysicalOffsetFrame radius_r_offset: socket_parent=/bodyset/radius_r translation=(-0.008797 -0.233053 0.01361)
      PhysicalOffsetFrame hand_r_offset: socket_parent=/bodyset/hand_r translation=(0 0 0)
      SpatialTransform: axes_held_at_zero=(rotation3 translation1 translation2 translation3)
        TransformAxis rotation1: coordinates=wrist_flex_r axis=(0 0 1) LinearFunction(coefficients=1 0)
        TransformAxis rotation2: coordinates=wrist_dev_r axis=(1 0 0) LinearFunction(coefficients=1 0)
  ConstraintSet:
    CoordinateCouplerConstraint auxSTERNrjnt_r1_con: independent_coordinate_names=auxSTERNrjnt_r1
        dependent_coordinate_name=rollRSCA coupled_coordinates_function=LinearFunction(coefficients=4.99 0)
    CoordinateCouplerConstraint auxSTERNrjnt_r2_con: independent_coordinate_names=auxSTERNrjnt_r2
        dependent_coordinate_name=pitchRSCA coupled_coordinates_function=LinearFunction(coefficients=-0.5056 0)
    CoordinateCouplerConstraint auxSTERNrjnt_r3_con: independent_coordinate_names=auxSTERNrjnt_r3
        dependent_coordinate_name=yawRSCA coupled_coordinates_function=LinearFunction(coefficients=0.7842 0)
    CoordinateCouplerConstraint auxSTERNljnt_r1_con: independent_coordinate_names=auxSTERNljnt_r1
        dependent_coordinate_name=rollLSCA coupled_coordinates_function=LinearFunction(coefficients=4.99 0)
    CoordinateCouplerConstraint auxSTERNljnt_r2_con: independent_coordinate_names=auxSTERNljnt_r2
        dependent_coordinate_name=pitchLSCA coupled_coordinates_function=LinearFunction(coefficients=-0.5056 0)
    CoordinateCouplerConstraint auxSTERNljnt_r3_con: independent_coordinate_names=auxSTERNljnt_r3
        dependent_coordinate_name=yawLSCA coupled_coordinates_function=LinearFunction(coefficients=0.7842 0)
    CoordinateCouplerConstraint HumR_CLAVjnt_armFLEX_clavYAW: independent_coordinate_names=arm_flex_r
        dependent_coordinate_name=auxSTERNrjnt_r3
      coupled_coordinates_function: SimmSpline: x=(-1.0472 -0.698968 -0.176623 0.261799 0.349066 0.436332 0.523599 0.610865 0.698132 0.785398 0.872665 0.959931 1.0472 1.13446 1.22173 1.309 1.39626 1.48353 1.5708 1.65806 1.74533 1.8326 1.91986 2.00713 2.0944 2.40855)
          y=(0.0122173 0.0122173 0.0122173 0.0122173 0.0174533 0.0244346 0.0331613 0.0453786 0.0628319 0.0820305 0.101229 0.122173 0.143117 0.164061 0.18326 0.202458 0.223402 0.244346 0.26529 0.287979 0.312414 0.340339 0.37001 0.39968 0.424115 0.561996)
    CoordinateCouplerConstraint HumR_CLAVjnt_armFLEX_clavROLL: independent_coordinate_names=arm_flex_r
        dependent_coordinate_name=auxSTERNrjnt_r1
      coupled_coordinates_function: SimmSpline: x=(-1.0472 -0.698968 -0.176623 0.261799 0.349066 0.436332 0.523599 0.610865 0.698132 0.785398 0.872665 0.959931 1.0472 1.13446 1.22173 1.309 1.39626 1.48353 1.65806 1.74533 2.0944 2.27604 2.40855)
          y=(0.185005 0.185005 0.185005 0.185005 0.18675 0.191986 0.200713 0.21293 0.221657 0.230383 0.237365 0.244346 0.251327 0.256563 0.261799 0.26529 0.268781 0.270526 0.274017 0.275762 0.294961 0.29726 0.300197)
    CoordinateCouplerConstraint HumR_CLAVjnt_armFLEX_clavPITCH: independent_coordinate_names=arm_flex_r
        dependent_coordinate_name=auxSTERNrjnt_r2
      coupled_coordinates_function: SimmSpline: x=(-1.0472 -0.698968 -0.176623 0.067267 0.261799 0.349066 0.436332 0.523599 0.610865 0.698132 0.785398 0.872665 0.959931 1.0472 1.13446 1.22173 1.309 1.39626 1.48353 1.5708 1.65806 1.74533 1.8326 1.91986 2.00713 2.0944 2.21269 2.27313 2.35773 2.40855)
          y=(0.403171 0.403171 0.403171 0.404313 0.403171 0.403171 0.417134 0.429351 0.443314 0.455531 0.469494 0.481711 0.495674 0.506145 0.516617 0.527089 0.534071 0.542797 0.551524 0.558505 0.565487 0.572468 0.579449 0.589921 0.600393 0.6253 0.639446 0.653539 0.661698 0.668461)
    CoordinateCouplerConstraint HumL_CLAVjnt_armFLEX_clavYAW: independent_coordinate_names=arm_flex_l
        dependent_coordinate_name=auxSTERNljnt_r3
      coupled_coordinates_function: SimmSpline: x=(-1.0472 -0.698968 -0.176623 0.261799 0.349066 0.436332 0.523599 0.610865 0.698132 0.785398 0.872665 0.959931 1.0472 1.13446 1.22173 1.309 1.39626 1.48353 1.5708 1.65806 1.74533 1.8326 1.91986 2.00713 2.0944 2.40855)
          y=(0.0122173 0.0122173 0.0122173 0.0122173 0.0174533 0.0244346 0.0331613 0.0453786 0.0628319 0.0820305 0.101229 0.122173 0.143117 0.164061 0.18326 0.202458 0.223402 0.244346 0.26529 0.287979 0.312414 0.340339 0.37001 0.39968 0.424115 0.561996)
    CoordinateCouplerConstraint HumL_CLAVjnt_armFLEX_clavROLL: independent_coordinate_names=arm_flex_l
        dependent_coordinate_name=auxSTERNljnt_r1
      coupled_coordinates_function: SimmSpline: x=(-1.0472 -0.698968 -0.176623 0.261799 0.349066 0.436332 0.523599 0.610865 0.698132 0.785398 0.872665 0.959931 1.0472 1.13446 1.22173 1.309 1.39626 1.48353 1.65806 1.74533 2.0944 2.27604 2.40855)
          y=(0.185005 0.185005 0.185005 0.185005 0.18675 0.191986 0.200713 0.21293 0.221657 0.230383 0.237365 0.244346 0.251327 0.256563 0.261799 0.26529 0.268781 0.270526 0.274017 0.275762 0.294961 0.29726 0.300197)
    CoordinateCouplerConstraint HumL_CLAVjnt_armFLEX_clavPITCH: independent_coordinate_names=arm_flex_l
        dependent_coordinate_name=auxSTERNljnt_r2
      coupled_coordinates_function: SimmSpline: x=(-1.0472 -0.698968 -0.176623 0.067267 0.261799 0.349066 0.436332 0.523599 0.610865 0.698132 0.785398 0.872665 0.959931 1.0472 1.13446 1.22173 1.309 1.39626 1.48353 1.5708 1.65806 1.74533 1.8326 1.91986 2.00713 2.0944 2.21269 2.27313 2.35773 2.40855)
          y=(0.403171 0.403171 0.403171 0.404313 0.403171 0.403171 0.417134 0.429351 0.443314 0.455531 0.469494 0.481711 0.495674 0.506145 0.516617 0.527089 0.534071 0.542797 0.551524 0.558505 0.565487 0.572468 0.579449 0.589921 0.600393 0.6253 0.639446 0.653539 0.661698 0.668461)
    CoordinateCouplerConstraint aux7jnt_r1_con: independent_coordinate_names=roll2 dependent_coordinate_name=aux7jnt_r1
      coupled_coordinates_function: SimmSpline: x=(-1.74533 1.74533) y=(-0.23911 0.23911)
    CoordinateCouplerConstraint aux7jnt_r2_con: independent_coordinate_names=yaw2 dependent_coordinate_name=aux7jnt_r2
      coupled_coordinates_function: SimmSpline: x=(-1.74533 1.74533) y=(-0.328122 0.328122)
    CoordinateCouplerConstraint aux7jnt_r3_con: independent_coordinate_names=pitch2
        dependent_coordinate_name=aux7jnt_r3
      coupled_coordinates_function: SimmSpline: x=(-1.74533 1.74533) y=(-0.326377 0.326377)
    CoordinateCouplerConstraint aux6jnt_r1_con: independent_coordinate_names=roll2 dependent_coordinate_name=aux6jnt_r1
      coupled_coordinates_function: SimmSpline: x=(-1.74533 1.74533) y=(-0.274017 0.274017)
    CoordinateCouplerConstraint aux6jnt_r2_con: independent_coordinate_names=yaw2 dependent_coordinate_name=aux6jnt_r2
      coupled_coordinates_function: SimmSpline: x=(-1.74533 1.74533) y=(-0.382227 0.382227)
    CoordinateCouplerConstraint aux6jnt_r3_con: independent_coordinate_names=pitch2
        dependent_coordinate_name=aux6jnt_r3
      coupled_coordinates_function: SimmSpline: x=(-1.74533 1.74533) y=(-0.383972 0.383972)
    CoordinateCouplerConstraint aux5jnt_r1_con: independent_coordinate_names=roll2 dependent_coordinate_name=aux5jnt_r1
      coupled_coordinates_function: SimmSpline: x=(-1.74533 1.74533) y=(-0.376991 0.376991)
    CoordinateCouplerConstraint aux5jnt_r2_con: independent_coordinate_names=yaw2 dependent_coordinate_name=aux5jnt_r2
      coupled_coordinates_function: SimmSpline: x=(-1.74533 1.74533) y=(-0.382227 0.382227)
    CoordinateCouplerConstraint aux5jnt_r3_con: independent_coordinate_names=pitch2
        dependent_coordinate_name=aux5jnt_r3
      coupled_coordinates_function: SimmSpline: x=(-1.74533 1.74533) y=(-0.383972 0.383972)
    CoordinateCouplerConstraint aux4jnt_r1_con: independent_coordinate_names=roll2 dependent_coordinate_name=aux4jnt_r1
      coupled_coordinates_function: SimmSpline: x=(-1.74533 1.74533) y=(-0.376991 0.376991)
    CoordinateCouplerConstraint aux4jnt_r2_con: independent_coordinate_names=yaw2 dependent_coordinate_name=aux4jnt_r2
      coupled_coordinates_function: SimmSpline: x=(-1.74533 1.74533) y=(-0.382227 0.382227)
    CoordinateCouplerConstraint aux4jnt_r3_con: independent_coordinate_names=pitch2
        dependent_coordinate_name=aux4jnt_r3
      coupled_coordinates_function: SimmSpline: x=(-1.74533 1.74533) y=(-0.287979 0.287979)
    CoordinateCouplerConstraint aux3jnt_r1_con: independent_coordinate_names=roll2 dependent_coordinate_name=aux3jnt_r1
      coupled_coordinates_function: SimmSpline: x=(-1.74533 1.74533) y=(-0.342085 0.342085)
    CoordinateCouplerConstraint aux3jnt_r2_con: independent_coordinate_names=yaw2 dependent_coordinate_name=aux3jnt_r2
      coupled_coordinates_function: SimmSpline: x=(-1.74533 1.74533) y=(-0.164061 0.164061)
    CoordinateCouplerConstraint aux3jnt_r3_con: independent_coordinate_names=pitch2
        dependent_coordinate_name=aux3jnt_r3
      coupled_coordinates_function: SimmSpline: x=(-1.74533 1.74533) y=(-0.191986 0.191986)
    CoordinateCouplerConstraint aux1jnt_r1_con: independent_coordinate_names=roll1 dependent_coordinate_name=aux1jnt_r1
      coupled_coordinates_function: SimmSpline: x=(-1.74533 1.74533) y=(-0.872665 0.872665)
    CoordinateCouplerConstraint aux1jnt_r2_con: independent_coordinate_names=yaw1 dependent_coordinate_name=aux1jnt_r2
      coupled_coordinates_function: SimmSpline: x=(-1.74533 1.74533) y=(-0.193732 0.193732)
    CoordinateCouplerConstraint aux1jnt_r3_con: independent_coordinate_names=pitch1
        dependent_coordinate_name=aux1jnt_r3
      coupled_coordinates_function: SimmSpline: x=(-1.74533 1.74533) y=(-0.970403 0.970403)
  MarkerSet:
    Marker Nose: skull (0.117995 0.0128447 0) fixed=true
    Marker Neck: torso (-0.0467946 0.322372 0)
    Marker LShoulder: torso (-0.04679465 0.3223718 -0.2039846)
    Marker L_lelbow_study: humerus_l (0.015 -0.28 -0.04) fixed=true
    Marker RShoulder: torso (-0.04679465 0.3223718 0.2039846)
    Marker r_lelbow_study: humerus_r (0.015 -0.28 0.04) fixed=true
    Marker r_melbow_study: humerus_r (0.00225 -0.286 -0.05) fixed=true
    Marker L_melbow_study: humerus_l (0.00225 -0.286 0.05) fixed=true
    Marker r_mwrist_study: radius_r (-0.022 -0.225 -0.022) fixed=true
    Marker L_mwrist_study: radius_l (-0.022 -0.225 0.022) fixed=true
    Marker L_lwrist_study: radius_l (0.0005 -0.225 -0.05) fixed=true
    Marker REye: skull (0.09363014 0.04690447 0.03200094) fixed=true
    Marker LEye: skull (0.0936301 0.0469045 -0.0320009) fixed=true
    Marker r_lwrist_study: radius_r (0.0005 -0.225 0.05) fixed=true
    Marker RHip: pelvis (-0.056276 -0.07849 0.07726)
    Marker LHip: pelvis (-0.056276 -0.07849 -0.07726)
