# OpenSim document version 40500
MarkerSet:
  Marker Nose: skull (0.117995 0.0128447 0) fixed=true
  Marker Neck: torso (-0.0467946 0.322372 0)
  Marker LShoulder: torso (-0.04679465 0.3223718 -0.2039846)
  Marker L_lelbow_study: humerus_l (0.015 -0.28 -0.04) fixed=true
  Marker RShoulder: torso (-0.04679465 0.3223718 0.2039846)
  Marker r_lelbow_study: humerus_r (0.015 -0.28 0.04) fixed=true
  Marker r_melbow_study: humerus_r (0.00225 -0.286 -0.05) fixed=true
  Marker L_melbow_study: humerus_l (0.00225 -0.286 0.05) fixed=true
  Marker r_mwrist_study: radius_r (-0.022 -0.225 -0.022) fixed=true
  Marker L_mwrist_study: radius_l (-0.022 -0.225 0.022) fixed=true
  Marker L_lwrist_study: radius_l (0.0005 -0.225 -0.05) fixed=true
  Marker REye: skull (0.09363014 0.04690447 0.03200094) fixed=true
  Marker LEye: skull (0.0936301 0.0469045 -0.0320009) fixed=true
  Marker r_lwrist_study: radius_r (0.0005 -0.225 0.05) fixed=true
  Marker RHip: pelvis (-0.056276 -0.07849 0.07726)
  Marker LHip: pelvis (-0.056276 -0.07849 -0.07726)
