# OpenSim document version 40500
Model MASI_HMaleMuscle:
  gravity: 0 -9.80665 0
  publications: List of publications related to model...
  length_units: meters
  force_units: N
  credits:
    Dario Cazzola and Grant Trewartha, University of Bath, Department for Health.
  Ground
  BodySet:
    Body pelvis: mass=11.777 [kg] mass_center=(-0.0707 0 0) inertia=(0.1028 0.0871 0.0579 0 0 0)
        meshes=(sacrum.vtp pelvis.vtp l_pelvis.vtp)
    Body spine: mass=0.5 mass_center=(0 0.222242 0) inertia=(0.01369 0.0041102 0.01369 0 0 0)
        meshes=(tlspine.vtp spine.vtp)
    Body lclavicle: mass=0.50426 mass_center=(-0.03 0.0167 -0.0983) inertia=(0.00024 0.00026 4e-5 -2e-5 -7e-5 5e-5)
        meshes=lclavicle.vtp
    Body lscapula: mass=2.437254 mass_center=(-0.0552994 -0.06105 0.0300854)
        inertia=(0.00124 0.00115 0.00137 0.00045 0.00041 0.00024) meshes=(lscapula.vtp scapula_lv.vtp)
    Body humerus_l: mass=2.0325 mass_center=(0 -0.164502 0) inertia=(0.011946 0.004121 0.013409 0 0 0)
        meshes=humerus_lv.vtp
    Body torso: mass=25.55 mass_center=(0.02 0.12 0) inertia=(1.67114 0.945824 1.67114 0 0 0) meshes=ribcage.vtp
    Body cerv7: mass=0.5840847 mass_center=(-0.0002 0.0071 0) inertia=(0.02 0.08 0.02 0 0 0) meshes=rotatedcerv7.vtp
    Body cerv6: mass=0.5077489 mass_center=(0.0002 0.0064 0) inertia=(0.02 0.08 0.02 0 0 0) meshes=cerv6.vtp
    Body cerv5: mass=0.4291 mass_center=(0.0001 0.0063 0) inertia=(0.02 0.08 0.02 0 0 0) meshes=cerv5.vtp
    Body cerv4: mass=0.4233168 mass_center=(-0.0003 0.0067 0) inertia=(0.02 0.08 0.02 0 0 0) meshes=cerv4.vtp
    Body cerv3: mass=0.419847 mass_center=(-0.0008 0.0071 0) inertia=(0.02 0.08 0.02 0 0 0) meshes=cerv3.vtp
    Body cerv2: mass=0.5875545 mass_center=(-0.001 0.0059 0) inertia=(0.02 0.08 0.02 0 0 0) meshes=cerv2.vtp
    Body cerv1: mass=0.4672677 mass_center=(0.0312 0.0019 0) inertia=(0.02 0.08 0.02 0 0 0) meshes=cerv1.vtp
    Body skull: mass=3.8 mass_center=(0 0.0676 0) inertia=(0.0263498 0.00809938 0.028416 0 0 0) meshes=skull.vtp
    Body jaw: mass=0.2 mass_center=(0 0.05 0) inertia=(0.04 0.02 0.04 0 0 0) meshes=jaw.vtp
    Body rclavicle: mass=0.50426 mass_center=(-0.03 0.0167 0.0983) inertia=(0.00024 0.00026 4e-5 -2e-5 -7e-5 5e-5)
        meshes=rclavicle.vtp
    Body rscapula: mass=2.437254 mass_center=(-0.0552994 -0.06105 -0.0300854)
        inertia=(0.00124 0.00115 0.00137 0.00045 0.00041 0.00024) meshes=(rscapula.vtp scapula_rv.vtp)
    Body humerus_r: mass=2.0325 mass_center=(0 -0.164502 0) inertia=(0.011946 0.004121 0.013409 0 0 0)
        meshes=humerus_rv.vtp
    Body ulna_l: mass=0.6075 mass_center=(0 -0.120525 0) inertia=(0.002962 0.000618 0.003213 0 0 0) meshes=ulna_lv.vtp
    Body radius_l: mass=0.6075 mass_center=(0 -0.120525 0) inertia=(0.002962 0.000618 0.003213 0 0 0)
        meshes=radius_lv.vtp
    Body hand_l: mass=0.4575 mass_center=(0 -0.068095 0) inertia=(0.000892 0.000547 0.00134 0 0 0)
        meshes=(pisiform_lvs.vtp lunate_lvs.vtp scaphoid_lvs.vtp triquetrum_lvs.vtp hamate_lvs.vtp capitate_lvs.vtp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)
    Body ulna_r: mass=0.6075 mass_center=(0 -0.120525 0) inertia=(0.002962 0.000618 0.003213 0 0 0) meshes=ulna_rv.vtp
    Body radius_r: mass=0.6075 mass_center=(0 -0.120525 0) inertia=(0.002962 0.000618 0.003213 0 0 0)
        meshes=radius_rv.vtp
    Body hand_r: mass=0.4575 mass_center=(0 -0.068095 0) inertia=(0.000892 0.000547 0.00134 0 0 0)
        meshes=(pisiform_rvs.vtp lunate_rvs.vtp scaphoid_rvs.vtp triquetrum_rvs.vtp hamate_rvs.vtp capitate_rvs.vtp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)
    Body femur_r: mass=9.3014 mass_center=(0 -0.17 0) inertia=(0.1339 0.0351 0.1412 0 0 0) meshes=femur_r.vtp
    Body tibia_r: mass=3.7075 mass_center=(0 -0.1867 0) inertia=(0.0504 0.0051 0.0511 0 0 0)
        meshes=(tibia_r.vtp fibula_r.vtp)
    Body talus_r: mass=0.1 mass_center=(0 0 0) inertia=(0.001 0.001 0.001 0 0 0) meshes=talus.vtp
    Body calcn_r: mass=1.25 mass_center=(0.1 0.03 0) inertia=(0.0014 0.0039 0.0041 0 0 0) meshes=foot.vtp
    Body toes_r: mass=0.2166 mass_center=(0.0346 0.006 -0.0175) inertia=(0.0001 0.0002 0.001 0 0 0) meshes=bofoot.vtp
    Body femur_l: mass=9.3014 mass_center=(0 -0.17 0) inertia=(0.1339 0.0351 0.1412 0 0 0) meshes=l_femur.vtp
    Body tibia_l: mass=3.7075 mass_center=(0 -0.1867 0) inertia=(0.0504 0.0051 0.0511 0 0 0)
        meshes=(l_tibia.vtp l_fibula.vtp)
    Body talus_l: mass=0.1 mass_center=(0 0 0) inertia=(0.001 0.001 0.001 0 0 0) meshes=l_talus.vtp
    Body calcn_l: mass=1.25 mass_center=(0.1 0.03 0) inertia=(0.0014 0.0039 0.0041 0 0 0) meshes=l_foot.vtp
    Body toes_l: mass=0.2166 mass_center=(0.0346 0.006 -0.0175) inertia=(0.0001 0.0002 0.001 0 0 0) meshes=l_bofoot.vtp
  JointSet:
    CustomJoint pelvisjnt: socket_parent_frame=ground_offset socket_child_frame=pelvis_offset
      Coordinate gndpitch: default_value=1.769299e-17 range=(-3.141593 3.141593) clamped=false
      Coordinate gndroll: default_value=-1.832514e-16 range=(-3.141593 3.141593) clamped=false
      Coordinate gndyaw: default_value=4.006268e-17 range=(-3.141593 3.141593) clamped=false
      Coordinate pelvis_tx: default_value=-2.996165e-12 range=(-5 5) clamped=false
      Coordinate pelvis_ty: default_value=1.15 range=(-1 2) clamped=false
      Coordinate pelvis_tz: default_value=-5.629243e-12 range=(-3 3) clamped=false
      PhysicalOffsetFrame ground_offset: socket_parent=/ground translation=(0.08 -0.173 0) [meters]
      PhysicalOffsetFrame pelvis_offset: socket_parent=/bodyset/pelvis translation=(0 0 0)
      SpatialTransform:
        TransformAxis rotation1: coordinates=gndpitch axis=(0 0 1) LinearFunction(coefficients=1 0)
        TransformAxis rotation2: coordinates=gndroll axis=(1 0 0) LinearFunction(coefficients=1 0)
        TransformAxis rotation3: coordinates=gndyaw axis=(0 1 0) LinearFunction(coefficients=1 0)
        TransformAxis translation1: coordinates=pelvis_tx axis=(1 0 0) LinearFunction(coefficients=1 0)
        TransformAxis translation2: coordinates=pelvis_ty axis=(0 1 0) LinearFunction(coefficients=1 0)
        TransformAxis translation3: coordinates=pelvis_tz axis=(0 0 1) LinearFunction(coefficients=1 0)
    CustomJoint spine_pelvis: socket_parent_frame=pelvis_offset socket_child_frame=spine_offset
      Coordinate spine_tilt: default_value=0 range=(-3.14159 3.14159) clamped=true
      Coordinate spine_list: default_value=0 range=(-3.14159 3.14159) clamped=true
      Coordinate spine_rotation: default_value=-3.85186e-34 range=(-3.14159 3.14159) clamped=true
      PhysicalOffsetFrame pelvis_offset: socket_parent=/bodyset/pelvis translation=(-0.08 0 0)
      PhysicalOffsetFrame spine_offset: socket_parent=/bodyset/spine translation=(0 0 0)
      SpatialTransform: axes_held_at_zero=(translation1 translation2 translation3)
        TransformAxis rotation1: coordinates=spine_tilt axis=(0 0 1) LinearFunction(coefficients=1 0)
        TransformAxis rotation2: coordinates=spine_list axis=(1 0 0) LinearFunction(coefficients=1 0)
        TransformAxis rotation3: coordinates=spine_rotation axis=(0 1 0) LinearFunction(coefficients=1 0)
    CustomJoint auxSTERNljnt: socket_parent_frame=spine_offset socket_child_frame=lclavicle_offset
      Coordinate auxSTERNljnt_r1: default_value=0.1844375 range=(-1.570796 1.570796) clamped=false
      Coordinate auxSTERNljnt_r2: default_value=0.4038863 range=(-1.570796 1.570796) clamped=false
      Coordinate auxSTERNljnt_r3: default_value=0.009392337 range=(-1.570796 1.570796) clamped=false
      PhysicalOffsetFrame spine_offset: socket_parent=/bodyset/spine translation=(-0.0118 0.5083 -0.022)
          orientation=(-0.02 -0.13 -0.1) [radians]
      PhysicalOffsetFrame lclavicle_offset: socket_parent=/bodyset/lclavicle translation=(0 0 0)
          orientation=(0.2 0.4 0)
      SpatialTransform: axes_held_at_zero=(translation1 translation2 translation3)
        TransformAxis rotation1: coordinates=auxSTERNljnt_r1 axis=(1 0 0) LinearFunction(coefficients=1 0)
        TransformAxis rotation2: coordinates=auxSTERNljnt_r2 axis=(0 1 0) LinearFunction(coefficients=1 0)
        TransformAxis rotation3: coordinates=auxSTERNljnt_r3 axis=(0 0 1) LinearFunction(coefficients=1 0)
    CustomJoint auxSCAPljnt: socket_parent_frame=lclavicle_offset socket_child_frame=lscapula_offset
      Coordinate rollLSCA: default_value=0.9203432 range=(-1.570796 1.570796) clamped=true
      Coordinate pitchLSCA: default_value=-0.2042049 range=(-1.570796 1.570796) clamped=true
      Coordinate yawLSCA: default_value=0.007365471 range=(-1.570796 1.570796) clamped=true
      PhysicalOffsetFrame lclavicle_offset: socket_parent=/bodyset/lclavicle translation=(-0.065 -0.02 -0.14)
          orientation=(-0.78 0.3 0.14)
      PhysicalOffsetFrame lscapula_offset: socket_parent=/bodyset/lscapula translation=(-0.03 -0.055 0.008)
          orientation=(0.45 -1 0.1)
      SpatialTransform: axes_held_at_zero=(translation1 translation3)
        TransformAxis rotation1: coordinates=rollLSCA axis=(1 0 0) LinearFunction(coefficients=1 0.0106)
        TransformAxis rotation2: coordinates=pitchLSCA axis=(0 -1 0) LinearFunction(coefficients=-1 0.7)
        TransformAxis rotation3: coordinates=yawLSCA axis=(0 0 1) LinearFunction(coefficients=1 -0.03888)
        TransformAxis translation2: axis=(0 1 0) LinearFunction(coefficients=0)
    CustomJoint acromial_l: socket_parent_frame=lscapula_offset socket_child_frame=humerus_l_offset
      Coordinate arm_flex_l: default_value=2.59279e-7 range=(-0.34889 2.792527) clamped=true
      Coordinate arm_add_l: default_value=2.368023e-8 range=(-2.61667 1.570796) clamped=true
      Coordinate arm_rot_l: default_value=-2.115039e-7 range=(-1.570796 2.792527) clamped=true
      PhysicalOffsetFrame lscapula_offset: socket_parent=/bodyset/lscapula translation=(-0.009 -0.04 -0.02)
          orientation=(0.3 -0.3 0.3)
      PhysicalOffsetFrame humerus_l_offset: socket_parent=/bodyset/humerus_l translation=(0 0 0)
      SpatialTransform: axes_held_at_zero=(translation1 translation2 translation3)
        TransformAxis rotation1: coordinates=arm_flex_l axis=(0 0 1) LinearFunction(coefficients=1 0)
        TransformAxis rotation2: coordinates=arm_add_l axis=(-1 0 0) LinearFunction(coefficients=1 0)
        TransformAxis rotation3: coordinates=arm_rot_l axis=(0 -1 0) LinearFunction(coefficients=1 0)
    WeldJoint ribcagejnt: socket_parent_frame=spine_offset socket_child_frame=torso_offset
      PhysicalOffsetFrame spine_offset: socket_parent=/bodyset/spine translation=(0 0.173 0)
      PhysicalOffsetFrame torso_offset: socket_parent=/bodyset/torso translation=(0 0 0)
    CustomJoint auxt1jnt: socket_parent_frame=spine_offset socket_child_frame=cerv7_offset
      Coordinate pitch2: default_value=1.192285e-6 range=(-0.5759587 0.837758) clamped=true
      Coordinate roll2: default_value=-7.417425e-34 range=(-0.5759587 0.5759587) clamped=true
      Coordinate yaw2: default_value=-1.940732e-33 range=(-0.4712389 0.4712389) clamped=true
      PhysicalOffsetFrame spine_offset: socket_parent=/bodyset/spine translation=(-0.0475 0.5343 0)
      PhysicalOffsetFrame cerv7_offset: socket_parent=/bodyset/cerv7 translation=(0.00684 -0.005655 0)
      SpatialTransform: axes_held_at_zero=(translation1 translation2 translation3)
        TransformAxis rotation1: coordinates=pitch2 axis=(0 0 1)
          SimmSpline: x=(-1.74533 1.74533) y=(-0.172788 0.172788)
        TransformAxis rotation2: coordinates=roll2 axis=(1 0 0)
          SimmSpline: x=(-1.74533 1.74533) y=(-0.136136 0.136136)
        TransformAxis rotation3: coordinates=yaw2 axis=(0 1 0)
          SimmSpline: x=(-1.74533 1.74533) y=(-0.109956 0.109956)
    CustomJoint aux7jnt: socket_parent_frame=cerv7_offset socket_child_frame=cerv6_offset
      Coordinate aux7jnt_r3: default_value=2.229575e-7 range=(-99999.9 99999.9) clamped=false
      Coordinate aux7jnt_r1: default_value=0 range=(-99999.9 99999.9) clamped=false
      Coordinate aux7jnt_r2: default_value=0 range=(-99999.9 99999.9) clamped=false
      PhysicalOffsetFrame cerv7_offset: socket_parent=/bodyset/cerv7 translation=(0.013256 0.01238 0)
      PhysicalOffsetFrame cerv6_offset: socket_parent=/bodyset/cerv6 translation=(0.009419 -0.004065 0)
      SpatialTransform: axes_held_at_zero=(translation1 translation2 translation3)
        TransformAxis rotation1: coordinates=aux7jnt_r3 axis=(0 0 1) LinearFunction(coefficients=1 0)
        TransformAxis rotation2: coordinates=aux7jnt_r1 axis=(1 0 0) LinearFunction(coefficients=1 0)
        TransformAxis rotation3: coordinates=aux7jnt_r2 axis=(0 1 0) LinearFunction(coefficients=1 0)
    CustomJoint aux6jnt: socket_parent_frame=cerv6_offset socket_child_frame=cerv5_offset
      Coordinate aux6jnt_r3: default_value=2.623023e-7 range=(-99999.9 99999.9) clamped=false
      Coordinate aux6jnt_r1: default_value=0 range=(-99999.9 99999.9) clamped=false
      Coordinate aux6jnt_r2: default_value=0 range=(-99999.9 99999.9) clamped=false
      PhysicalOffsetFrame cerv6_offset: socket_parent=/bodyset/cerv6 translation=(0.00985 0.00975 0)
      PhysicalOffsetFrame cerv5_offset: socket_parent=/bodyset/cerv5 translation=(0.00567 -0.00815 0)
      SpatialTransform: axes_held_at_zero=(translation1 translation2 translation3)
        TransformAxis rotation1: coordinates=aux6jnt_r3 axis=(0 0 1) LinearFunction(coefficients=1 0)
        TransformAxis rotation2: coordinates=aux6jnt_r1 axis=(1 0 0) LinearFunction(coefficients=1 0)
        TransformAxis rotation3: coordinates=aux6jnt_r2 axis=(0 1 0) LinearFunction(coefficients=1 0)
    CustomJoint aux5jnt: socket_parent_frame=cerv5_offset socket_child_frame=cerv4_offset
      Coordinate aux5jnt_r3: default_value=2.623023e-7 range=(-99999.9 99999.9) clamped=false
      Coordinate aux5jnt_r1: default_value=0 range=(-99999.9 99999.9) clamped=false
      Coordinate aux5jnt_r2: default_value=0 range=(-99999.9 99999.9) clamped=false
      PhysicalOffsetFrame cerv5_offset: socket_parent=/bodyset/cerv5 translation=(0.00843 0.00745 0)
      PhysicalOffsetFrame cerv4_offset: socket_parent=/bodyset/cerv4 translation=(0.00502 -0.01172 0)
      SpatialTransform: axes_held_at_zero=(translation1 translation2 translation3)
        TransformAxis rotation1: coordinates=aux5jnt_r3 axis=(0 0 1) LinearFunction(coefficients=1 0)
        TransformAxis rotation2: coordinates=aux5jnt_r1 axis=(1 0 0) LinearFunction(coefficients=1 0)
        TransformAxis rotation3: coordinates=aux5jnt_r2 axis=(0 1 0) LinearFunction(coefficients=1 0)
    CustomJoint aux4jnt: socket_parent_frame=cerv4_offset socket_child_frame=cerv3_offset
      Coordinate aux4jnt_r3: default_value=1.967267e-7 range=(-99999.9 99999.9) clamped=false
      Coordinate aux4jnt_r1: default_value=0 range=(-99999.9 99999.9) clamped=false
      Coordinate aux4jnt_r2: default_value=0 range=(-99999.9 99999.9) clamped=false
      PhysicalOffsetFrame cerv4_offset: socket_parent=/bodyset/cerv4 translation=(0.00732 0.00638 0)
      PhysicalOffsetFrame cerv3_offset: socket_parent=/bodyset/cerv3 translation=(0.00471 -0.00902 0)
      SpatialTransform: axes_held_at_zero=(translation1 translation2 translation3)
        TransformAxis rotation1: coordinates=aux4jnt_r3 axis=(0 0 1) LinearFunction(coefficients=1 0)
        TransformAxis rotation2: coordinates=aux4jnt_r1 axis=(1 0 0) LinearFunction(coefficients=1 0)
        TransformAxis rotation3: coordinates=aux4jnt_r2 axis=(0 1 0) LinearFunction(coefficients=1 0)
    CustomJoint aux3jnt: socket_parent_frame=cerv3_offset socket_child_frame=cerv2_offset
      Coordinate aux3jnt_r3: default_value=1.311512e-7 range=(-99999.9 99999.9) clamped=false
      Coordinate aux3jnt_r1: default_value=0 range=(-99999.9 99999.9) clamped=false
      Coordinate aux3jnt_r2: default_value=0 range=(-99999.9 99999.9) clamped=false
      PhysicalOffsetFrame cerv3_offset: socket_parent=/bodyset/cerv3 translation=(0.00525 0.00506 0)
      PhysicalOffsetFrame cerv2_offset: socket_parent=/bodyset/cerv2 translation=(0.00543 -0.01123 0)
      SpatialTransform: axes_held_at_zero=(translation1 translation2 translation3)
        TransformAxis rotation1: coordinates=aux3jnt_r3 axis=(0 0 1) LinearFunction(coefficients=1 0)
        TransformAxis rotation2: coordinates=aux3jnt_r1 axis=(1 0 0) LinearFunction(coefficients=1 0)
        TransformAxis rotation3: coordinates=aux3jnt_r2 axis=(0 1 0) LinearFunction(coefficients=1 0)
    CustomJoint aux2jnt: socket_parent_frame=cerv2_offset socket_child_frame=cerv1_offset
      Coordinate pitch1: default_value=1.578132e-6 range=(-0.2792527 0.418879) clamped=true
      Coordinate roll1: default_value=-1.889405e-33 range=(-0.1047198 0.1047198) clamped=true
      Coordinate yaw1: default_value=1.274842e-34 range=(-0.6632251 0.6632251) clamped=true
      PhysicalOffsetFrame cerv2_offset: socket_parent=/bodyset/cerv2 translation=(0.00689 0.02128 0)
      PhysicalOffsetFrame cerv1_offset: socket_parent=/bodyset/cerv1 translation=(0.04245 0.00352 0)
      SpatialTransform: axes_held_at_zero=(translation1 translation2 translation3)
        TransformAxis rotation1: coordinates=pitch1 axis=(0 0 1)
          SimmSpline: x=(-1.74533 1.74533) y=(-0.774926 0.774926)
        TransformAxis rotation2: coordinates=roll1 axis=(1 0 0)
          SimmSpline: x=(-1.74533 1.74533) y=(-0.872665 0.872665)
        TransformAxis rotation3: coordinates=yaw1 axis=(0 1 0)
          SimmSpline: x=(-1.74533 1.74533) y=(-1.5516 1.5516)
    CustomJoint aux1jnt: socket_parent_frame=cerv1_offset socket_child_frame=skull_offset
      Coordinate aux1jnt_r3: default_value=8.774408e-7 range=(-99999.9 99999.9) clamped=false
      Coordinate aux1jnt_r1: default_value=0 range=(-99999.9 99999.9) clamped=false
      Coordinate aux1jnt_r2: default_value=0 range=(-99999.9 99999.9) clamped=false
      PhysicalOffsetFrame cerv1_offset: socket_parent=/bodyset/cerv1 translation=(0.04335 0.01492 0)
      PhysicalOffsetFrame skull_offset: socket_parent=/bodyset/skull translation=(0 0 0)
      SpatialTransform: axes_held_at_zero=(translation1 translation2 translation3)
        TransformAxis rotation1: coordinates=aux1jnt_r3 axis=(0 0 1) LinearFunction(coefficients=1 0)
        TransformAxis rotation2: coordinates=aux1jnt_r1 axis=(1 0 0) LinearFunction(coefficients=1 0)
        TransformAxis rotation3: coordinates=aux1jnt_r2 axis=(0 1 0) LinearFunction(coefficients=1 0)
    WeldJoint jawjnt: socket_parent_frame=skull_offset socket_child_frame=jaw_offset
      PhysicalOffsetFrame skull_offset: socket_parent=/bodyset/skull translation=(0 0 0)
      PhysicalOffsetFrame jaw_offset: socket_parent=/bodyset/jaw translation=(0 0 0)
    CustomJoint auxSTERNrjnt: socket_parent_frame=spine_offset socket_child_frame=rclavicle_offset
      Coordinate auxSTERNrjnt_r1: default_value=0.1844375 range=(-1.570796 1.570796) clamped=false
      Coordinate auxSTERNrjnt_r2: default_value=0.4038863 range=(-1.570796 1.570796) clamped=false
      Coordinate auxSTERNrjnt_r3: default_value=0.00939234 range=(-1.570796 1.570796) clamped=false
      PhysicalOffsetFrame spine_offset: socket_parent=/bodyset/spine translation=(-0.0118 0.5083 0.022)
          orientation=(0.02 0.13 -0.1)
      PhysicalOffsetFrame rclavicle_offset: socket_parent=/bodyset/rclavicle translation=(0 0 0)
          orientation=(-0.2 -0.4 0)
      SpatialTransform: axes_held_at_zero=(translation1 translation2 translation3)
        TransformAxis rotation1: coordinates=auxSTERNrjnt_r1 axis=(-1 0 0) LinearFunction(coefficients=1 0)
        TransformAxis rotation2: coordinates=auxSTERNrjnt_r2 axis=(0 -1 0) LinearFunction(coefficients=1 0)
        TransformAxis rotation3: coordinates=auxSTERNrjnt_r3 axis=(0 0 1) LinearFunction(coefficients=1 0)
    CustomJoint auxSCAPrjnt: socket_parent_frame=rclavicle_offset socket_child_frame=rscapula_offset
      Coordinate rollRSCA: default_value=0.9203432 range=(-1.570796 1.570796) clamped=true
      Coordinate pitchRSCA: default_value=-0.2042049 range=(-1.570796 1.570796) clamped=true
      Coordinate yawRSCA: default_value=0.007365473 range=(-1.570796 1.570796) clamped=true
      PhysicalOffsetFrame rclavicle_offset: socket_parent=/bodyset/rclavicle translation=(-0.065 -0.02 0.14)
          orientation=(0.78 -0.3 0.14)
      PhysicalOffsetFrame rscapula_offset: socket_parent=/bodyset/rscapula translation=(-0.03 -0.055 -0.008)
          orientation=(-0.45 1 0.1)
      SpatialTransform: axes_held_at_zero=(translation1 translation3)
        TransformAxis rotation1: coordinates=rollRSCA axis=(1 0 0) LinearFunction(coefficients=-1 -0.0106)
        TransformAxis rotation2: coordinates=pitchRSCA axis=(0 -1 0) LinearFunction(coefficients=1 -0.7)
        TransformAxis rotation3: coordinates=yawRSCA axis=(0 0 1) LinearFunction(coefficients=1 -0.03888)
        TransformAxis translation2: axis=(0 1 0) LinearFunction(coefficients=0)
    CustomJoint acromial_r: socket_parent_frame=rscapula_offset socket_child_frame=humerus_r_offset
      Coordinate arm_flex_r: default_value=5.81598e-9 range=(-0.34889 2.792527) clamped=true
      Coordinate arm_add_r: default_value=1.74281e-7 range=(-2.61667 1.570796) clamped=true
      Coordinate arm_rot_r: default_value=-2.115039e-7 range=(-1.570796 2.792527) clamped=true
      PhysicalOffsetFrame rscapula_offset: socket_parent=/bodyset/rscapula translation=(-0.009 -0.04 0.02)
          orientation=(-0.3 0.3 0.3)
      PhysicalOffsetFrame humerus_r_offset: socket_parent=/bodyset/humerus_r translation=(0 0 0)
      SpatialTransform: axes_held_at_zero=(translation1 translation2 translation3)
        TransformAxis rotation1: coordinates=arm_flex_r axis=(0 0 1) LinearFunction(coefficients=1 0)
        TransformAxis rotation2: coordinates=arm_add_r axis=(1 0 0) LinearFunction(coefficients=1 0)
        TransformAxis rotation3: coordinates=arm_rot_r axis=(0 1 0) LinearFunction(coefficients=1 0)
    CustomJoint elbow_l: socket_parent_frame=humerus_l_offset socket_child_frame=ulna_l_offset
      Coordinate elbow_flex_l: default_value=8.992902e-5 range=(0 2.618) clamped=true
      PhysicalOffsetFrame humerus_l_offset: socket_parent=/bodyset/humerus_l translation=(0.013144 -0.31098 0.009595)
      PhysicalOffsetFrame ulna_l_offset: socket_parent=/bodyset/ulna_l translation=(0 0 0)
      SpatialTransform: axes_held_at_zero=(rotation2 rotation3 translation1 translation2 translation3)
        TransformAxis rotation1: coordinates=elbow_flex_l axis=(-0.226047 -0.022269 0.9738618)
            LinearFunction(coefficients=1 0)
    CustomJoint radioulnar_l: socket_parent_frame=ulna_l_offset socket_child_frame=radius_l_offset
      Coordinate pro_sup_l: default_value=3.054878e-10 range=(-2.094395 3.141593) clamped=true
      PhysicalOffsetFrame ulna_l_offset: socket_parent=/bodyset/ulna_l translation=(-0.006727 -0.0128533 -0.026083)
      PhysicalOffsetFrame radius_l_offset: socket_parent=/bodyset/radius_l translation=(0 0 0)
      SpatialTransform: axes_held_at_zero=(rotation2 rotation3 translation1 translation2 translation3)
        TransformAxis rotation1: coordinates=pro_sup_l axis=(-0.05639803 -0.9984065 0.001952)
            LinearFunction(coefficients=1 0)
    CustomJoint radius_hand_l: socket_parent_frame=radius_l_offset socket_child_frame=hand_l_offset
      Coordinate wrist_flex_l: default_value=0 range=(-1.22173 1.22173) clamped=true
      Coordinate wrist_dev_l: default_value=1.334961e-9 range=(-0.4363323 0.6108652) clamped=true
      PhysicalOffsetFrame radius_l_offset: socket_parent=/bodyset/radius_l translation=(-0.008797 -0.233053 -0.01361)
      PhysicalOffsetFrame hand_l_offset: socket_parent=/bodyset/hand_l translation=(0 0 0)
      SpatialTransform: axes_held_at_zero=(rotation3 translation1 translation2 translation3)
        TransformAxis rotation1: coordinates=wrist_flex_l axis=(0 0 1) LinearFunction(coefficients=1 0)
        TransformAxis rotation2: coordinates=wrist_dev_l axis=(-1 0 0) LinearFunction(coefficients=1 0)
    CustomJoint elbow_r: socket_parent_frame=humerus_r_offset socket_child_frame=ulna_r_offset
      Coordinate elbow_flex_r: default_value=9.708936e-5 range=(0 2.618) clamped=true
      PhysicalOffsetFrame humerus_r_offset: socket_parent=/bodyset/humerus_r translation=(0.013144 -0.31098 -0.009595)
      PhysicalOffsetFrame ulna_r_offset: socket_parent=/bodyset/ulna_r translation=(0 0 0)
      SpatialTransform: axes_held_at_zero=(rotation2 rotation3 translation1 translation2 translation3)
        TransformAxis rotation1: coordinates=elbow_flex_r axis=(0.226047 0.022269 0.9738618)
            LinearFunction(coefficients=1 0)
    CustomJoint radioulnar_r: socket_parent_frame=ulna_r_offset socket_child_frame=radius_r_offset
      Coordinate pro_sup_r: default_value=2.702932e-10 range=(-2.094395 3.141593) clamped=true
      PhysicalOffsetFrame ulna_r_offset: socket_parent=/bodyset/ulna_r translation=(-0.006727 -0.0128533 0.026083)
      PhysicalOffsetFrame radius_r_offset: socket_parent=/bodyset/radius_r translation=(0 0 0)
      SpatialTransform: axes_held_at_zero=(rotation2 rotation3 translation1 translation2 translation3)
        TransformAxis rotation1: coordinates=pro_sup_r axis=(0.05639803 0.9984065 0.001952)
            LinearFunction(coefficients=1 0)
    CustomJoint radius_hand_r: socket_parent_frame=radius_r_offset socket_child_frame=hand_r_offset
      Coordinate wrist_flex_r: default_value=0 range=(-1.22173 1.22173) clamped=true
      Coordinate wrist_dev_r: default_value=1.004252e-9 range=(-0.4363323 0.6108652) clamped=true
      PhysicalOffsetFrame radius_r_offset: socket_parent=/bodyset/radius_r translation=(-0.008797 -0.233053 0.01361)
      PhysicalOffsetFrame hand_r_offset: socket_parent=/bodyset/hand_r translation=(0 0 0)
      SpatialTransform: axes_held_at_zero=(rotation3 translation1 translation2 translation3)
        TransformAxis rotation1: coordinates=wrist_flex_r axis=(0 0 1) LinearFunction(coefficients=1 0)
        TransformAxis rotation2: coordinates=wrist_dev_r axis=(1 0 0) LinearFunction(coefficients=1 0)
    CustomJoint hip_r: socket_parent_frame=pelvis_offset socket_child_frame=femur_r_offset
      Coordinate hip_flexion_r: default_value=1.17695e-11 range=(-2.094395 2.094395) clamped=true
      Coordinate hip_adduction_r: default_value=4.150182e-12 range=(-2.094395 2.094395) clamped=true
      Coordinate hip_rotation_r: default_value=5.191315e-12 range=(-2.094395 2.094395) clamped=true
      PhysicalOffsetFrame pelvis_offset: socket_parent=/bodyset/pelvis translation=(-0.0707 -0.0661 0.0835)
      PhysicalOffsetFrame femur_r_offset: socket_parent=/bodyset/femur_r translation=(0 0 0)
      SpatialTransform: axes_held_at_zero=(translation1 translation2 translation3)
        TransformAxis rotation1: coordinates=hip_flexion_r axis=(0 0 1) LinearFunction(coefficients=1 0)
        TransformAxis rotation2: coordinates=hip_adduction_r axis=(1 0 0) LinearFunction(coefficients=1 0)
        TransformAxis rotation3: coordinates=hip_rotation_r axis=(0 1 0) LinearFunction(coefficients=1 0)
    CustomJoint knee_r: socket_parent_frame=femur_r_offset socket_child_frame=tibia_r_offset
      Coordinate knee_angle_r: default_value=-4.793323e-9 range=(-2.094395 0.1745329) clamped=true
      PhysicalOffsetFrame femur_r_offset: socket_parent=/bodyset/femur_r translation=(0 0 0)
      PhysicalOffsetFrame tibia_r_offset: socket_parent=/bodyset/tibia_r translation=(0 0 0)
      SpatialTransform: axes_held_at_zero=(rotation2 rotation3 translation3)
        TransformAxis rotation1: coordinates=knee_angle_r axis=(0 0 1) LinearFunction(coefficients=1 0)
        TransformAxis translation1: coordinates=knee_angle_r axis=(1 0 0)
          SimmSpline: x=(-2.0944 -1.74533 -1.39626 -1.0472 -0.698132 -0.349066 -0.174533 0.197344 0.337395 0.490178 1.52146 2.0944)
              y=(-0.0032 0.00179 0.00411 0.0041 0.00212 -0.001 -0.0031 -0.005227 -0.005435 -0.005574 -0.005435 -0.00525)
        TransformAxis translation2: coordinates=knee_angle_r axis=(0 1 0)
          SimmSpline: x=(-2.0944 -1.22173 -0.523599 -0.349066 -0.174533 0.159149 2.0944)
              y=(-0.4226 -0.4082 -0.399 -0.3976 -0.3966 -0.395264 -0.396)
    CustomJoint ankle_r: socket_parent_frame=tibia_r_offset socket_child_frame=talus_r_offset
      Coordinate ankle_angle_r: default_value=-4.234282e-12 range=(-1.570796 1.570796) clamped=true
      PhysicalOffsetFrame tibia_r_offset: socket_parent=/bodyset/tibia_r translation=(0 -0.43 0)
      PhysicalOffsetFrame talus_r_offset: socket_parent=/bodyset/talus_r translation=(0 0 0)
      SpatialTransform: axes_held_at_zero=(rotation2 rotation3 translation1 translation2 translation3)
        TransformAxis rotation1: coordinates=ankle_angle_r axis=(-0.1050135 -0.1740224 0.9791263)
            LinearFunction(coefficients=1 0)
    CustomJoint subtalar_r: socket_parent_frame=talus_r_offset socket_child_frame=calcn_r_offset
      Coordinate subtalar_angle_r: default_value=0 range=(-1.570796 1.570796) clamped=true
      PhysicalOffsetFrame talus_r_offset: socket_parent=/bodyset/talus_r translation=(-0.04877 -0.04195 0.00792)
      PhysicalOffsetFrame calcn_r_offset: socket_parent=/bodyset/calcn_r translation=(0 0 0)
      SpatialTransform: axes_held_at_zero=(rotation2 rotation3 translation1 translation2 translation3)
        TransformAxis rotation1: coordinates=subtalar_angle_r axis=(0.7871796 0.6047475 -0.1209495)
            LinearFunction(coefficients=1 0)
    CustomJoint mtp_r: socket_parent_frame=calcn_r_offset socket_child_frame=toes_r_offset
      Coordinate mtp_angle_r: default_value=0 range=(-1.570796 1.570796) clamped=true
      PhysicalOffsetFrame calcn_r_offset: socket_parent=/bodyset/calcn_r translation=(0.1788 -0.002 0.00108)
      PhysicalOffsetFrame toes_r_offset: socket_parent=/bodyset/toes_r translation=(0 0 0)
      SpatialTransform: axes_held_at_zero=(rotation2 rotation3 translation1 translation2 translation3)
        TransformAxis rotation1: coordinates=mtp_angle_r axis=(-0.5809544 0 0.8139361) LinearFunction(coefficients=1 0)
    CustomJoint hip_l: socket_parent_frame=pelvis_offset socket_child_frame=femur_l_offset
      Coordinate hip_flexion_l: default_value=4.592572e-13 range=(-2.094395 2.094395) clamped=true
      Coordinate hip_adduction_l: default_value=3.443451e-12 range=(-2.094395 2.094395) clamped=true
      Coordinate hip_rotation_l: default_value=-2.682821e-12 range=(-2.094395 2.094395) clamped=true
      PhysicalOffsetFrame pelvis_offset: socket_parent=/bodyset/pelvis translation=(-0.0707 -0.0661 -0.0835)
      PhysicalOffsetFrame femur_l_offset: socket_parent=/bodyset/femur_l translation=(0 0 0)
      SpatialTransform: axes_held_at_zero=(translation1 translation2 translation3)
        TransformAxis rotation1: coordinates=hip_flexion_l axis=(0 0 1) LinearFunction(coefficients=1 0)
        TransformAxis rotation2: coordinates=hip_adduction_l axis=(-1 0 0) LinearFunction(coefficients=1 0)
        TransformAxis rotation3: coordinates=hip_rotation_l axis=(0 -1 0) LinearFunction(coefficients=1 0)
    CustomJoint knee_l: socket_parent_frame=femur_l_offset socket_child_frame=tibia_l_offset
      Coordinate knee_angle_l: default_value=-7.14809e-9 range=(-2.094395 0.1745329) clamped=true
      PhysicalOffsetFrame femur_l_offset: socket_parent=/bodyset/femur_l translation=(0 0 0)
      PhysicalOffsetFrame tibia_l_offset: socket_parent=/bodyset/tibia_l translation=(0 0 0)
      SpatialTransform: axes_held_at_zero=(rotation2 rotation3 translation3)
        TransformAxis rotation1: coordinates=knee_angle_l axis=(0 0 1) LinearFunction(coefficients=1 0)
        TransformAxis translation1: coordinates=knee_angle_l axis=(1 0 0)
          SimmSpline: x=(-2.0944 -1.74533 -1.39626 -1.0472 -0.698132 -0.349066 -0.174533 0.197344 0.337395 0.490178 1.52146 2.0944)
              y=(-0.0032 0.00179 0.00411 0.0041 0.00212 -0.001 -0.0031 -0.005227 -0.005435 -0.005574 -0.005435 -0.00525)
        TransformAxis translation2: coordinates=knee_angle_l axis=(0 1 0)
          SimmSpline: x=(-2.0944 -1.22173 -0.523599 -0.349066 -0.174533 0.159149 2.0944)
              y=(-0.4226 -0.4082 -0.399 -0.3976 -0.3966 -0.395264 -0.396)
    CustomJoint ankle_l: socket_parent_frame=tibia_l_offset socket_child_frame=talus_l_offset
      Coordinate ankle_angle_l: default_value=-6.832702e-13 range=(-1.047198 1.047198) clamped=true
      PhysicalOffsetFrame tibia_l_offset: socket_parent=/bodyset/tibia_l translation=(0 -0.43 0)
      PhysicalOffsetFrame talus_l_offset: socket_parent=/bodyset/talus_l translation=(0 0 0)
      SpatialTransform: axes_held_at_zero=(rotation2 rotation3 translation1 translation2 translation3)
        TransformAxis rotation1: coordinates=ankle_angle_l axis=(0.1050135 0.1740224 0.9791263)
            LinearFunction(coefficients=1 0)
    CustomJoint subtalar_l: socket_parent_frame=talus_l_offset socket_child_frame=calcn_l_offset
      Coordinate subtalar_angle_l: default_value=0 range=(-1.570796 1.570796) clamped=true
      PhysicalOffsetFrame talus_l_offset: socket_parent=/bodyset/talus_l translation=(-0.04877 -0.04195 -0.00792)
      PhysicalOffsetFrame calcn_l_offset: socket_parent=/bodyset/calcn_l translation=(0 0 0)
      SpatialTransform: axes_held_at_zero=(rotation2 rotation3 translation1 translation2 translation3)
        TransformAxis rotation1: coordinates=subtalar_angle_l axis=(-0.7871796 -0.6047475 -0.1209495)
            LinearFunction(coefficients=1 0)
    CustomJoint mtp_l: socket_parent_frame=calcn_l_offset socket_child_frame=toes_l_offset
      Coordinate mtp_angle_l: default_value=0 range=(-1.047198 1.047198) clamped=true
      PhysicalOffsetFrame calcn_l_offset: socket_parent=/bodyset/calcn_l translation=(0.1788 -0.002 -0.00108)
      PhysicalOffsetFrame toes_l_offset: socket_parent=/bodyset/toes_l translation=(0 0 0)
      SpatialTransform: axes_held_at_zero=(rotation2 rotation3 translation1 translation2 translation3)
        TransformAxis rotation1: coordinates=mtp_angle_l axis=(0.5809544 0 0.8139361) LinearFunction(coefficients=1 0)
  ConstraintSet:
    CoordinateCouplerConstraint auxSTERNrjnt_r1_con: independent_coordinate_names=auxSTERNrjnt_r1
        dependent_coordinate_name=rollRSCA coupled_coordinates_function=LinearFunction(coefficients=4.99 0)
    CoordinateCouplerConstraint auxSTERNrjnt_r2_con: independent_coordinate_names=auxSTERNrjnt_r2
        dependent_coordinate_name=pitchRSCA coupled_coordinates_function=LinearFunction(coefficients=-0.5056 0)
    CoordinateCouplerConstraint auxSTERNrjnt_r3_con: independent_coordinate_names=auxSTERNrjnt_r3
        dependent_coordinate_name=yawRSCA coupled_coordinates_function=LinearFunction(coefficients=0.7842 0)
    CoordinateCouplerConstraint auxSTERNljnt_r1_con: independent_coordinate_names=auxSTERNljnt_r1
        dependent_coordinate_name=rollLSCA coupled_coordinates_function=LinearFunction(coefficients=4.99 0)
    CoordinateCouplerConstraint auxSTERNljnt_r2_con: independent_coordinate_names=auxSTERNljnt_r2
        dependent_coordinate_name=pitchLSCA coupled_coordinates_function=LinearFunction(coefficients=-0.5056 0)
    CoordinateCouplerConstraint auxSTERNljnt_r3_con: independent_coordinate_names=auxSTERNljnt_r3
        dependent_coordinate_name=yawLSCA coupled_coordinates_function=LinearFunction(coefficients=0.7842 0)
    CoordinateCouplerConstraint HumR_CLAVjnt_armFLEX_clavYAW: isEnforced=false independent_coordinate_names=arm_flex_r
        dependent_coordinate_name=auxSTERNrjnt_r3
      coupled_coordinates_function: SimmSpline: x=(-1.0472 -0.698968 -0.176623 0.261799 0.349066 0.436332 0.523599 0.610865 0.698132 0.785398 0.872665 0.959931 1.0472 1.13446 1.22173 1.309 1.39626 1.48353 1.5708 1.65806 1.74533 1.8326 1.91986 2.00713 2.0944 2.40855)
          y=(0.0122173 0.0122173 0.0122173 0.0122173 0.0174533 0.0244346 0.0331613 0.0453786 0.0628319 0.0820305 0.101229 0.122173 0.143117 0.164061 0.18326 0.202458 0.223402 0.244346 0.26529 0.287979 0.312414 0.340339 0.37001 0.39968 0.424115 0.561996)
    CoordinateCouplerConstraint HumR_CLAVjnt_armFLEX_clavROLL: isEnforced=false independent_coordinate_names=arm_flex_r
        dependent_coordinate_name=auxSTERNrjnt_r1
      coupled_coordinates_function: SimmSpline: x=(-1.0472 -0.698968 -0.176623 0.261799 0.349066 0.436332 0.523599 0.610865 0.698132 0.785398 0.872665 0.959931 1.0472 1.13446 1.22173 1.309 1.39626 1.48353 1.65806 1.74533 2.0944 2.27604 2.40855)
          y=(0.185005 0.185005 0.185005 0.185005 0.18675 0.191986 0.200713 0.21293 0.221657 0.230383 0.237365 0.244346 0.251327 0.256563 0.261799 0.26529 0.268781 0.270526 0.274017 0.275762 0.294961 0.29726 0.300197)
    CoordinateCouplerConstraint HumR_CLAVjnt_armFLEX_clavPITCH: isEnforced=false
        independent_coordinate_names=arm_flex_r dependent_coordinate_name=auxSTERNrjnt_r2
      coupled_coordinates_function: SimmSpline: x=(-1.0472 -0.698968 -0.176623 0.067267 0.261799 0.349066 0.436332 0.523599 0.610865 0.698132 0.785398 0.872665 0.959931 1.0472 1.13446 1.22173 1.309 1.39626 1.48353 1.5708 1.65806 1.74533 1.8326 1.91986 2.00713 2.0944 2.21269 2.27313 2.35773 2.40855)
          y=(0.403171 0.403171 0.403171 0.404313 0.403171 0.403171 0.417134 0.429351 0.443314 0.455531 0.469494 0.481711 0.495674 0.506145 0.516617 0.527089 0.534071 0.542797 0.551524 0.558505 0.565487 0.572468 0.579449 0.589921 0.600393 0.6253 0.639446 0.653539 0.661698 0.668461)
    CoordinateCouplerConstraint HumL_CLAVjnt_armFLEX_clavYAW: isEnforced=false independent_coordinate_names=arm_flex_l
        dependent_coordinate_name=auxSTERNljnt_r3
      coupled_coordinates_function: SimmSpline: x=(-1.0472 -0.698968 -0.176623 0.261799 0.349066 0.436332 0.523599 0.610865 0.698132 0.785398 0.872665 0.959931 1.0472 1.13446 1.22173 1.309 1.39626 1.48353 1.5708 1.65806 1.74533 1.8326 1.91986 2.00713 2.0944 2.40855)
          y=(0.0122173 0.0122173 0.0122173 0.0122173 0.0174533 0.0244346 0.0331613 0.0453786 0.0628319 0.0820305 0.101229 0.122173 0.143117 0.164061 0.18326 0.202458 0.223402 0.244346 0.26529 0.287979 0.312414 0.340339 0.37001 0.39968 0.424115 0.561996)
    CoordinateCouplerConstraint HumL_CLAVjnt_armFLEX_clavROLL: isEnforced=false independent_coordinate_names=arm_flex_l
        dependent_coordinate_name=auxSTERNljnt_r1
      coupled_coordinates_function: SimmSpline: x=(-1.0472 -0.698968 -0.176623 0.261799 0.349066 0.436332 0.523599 0.610865 0.698132 0.785398 0.872665 0.959931 1.0472 1.13446 1.22173 1.309 1.39626 1.48353 1.65806 1.74533 2.0944 2.27604 2.40855)
          y=(0.185005 0.185005 0.185005 0.185005 0.18675 0.191986 0.200713 0.21293 0.221657 0.230383 0.237365 0.244346 0.251327 0.256563 0.261799 0.26529 0.268781 0.270526 0.274017 0.275762 0.294961 0.29726 0.300197)
    CoordinateCouplerConstraint HumL_CLAVjnt_armFLEX_clavPITCH: isEnforced=false
        independent_coordinate_names=arm_flex_l dependent_coordinate_name=auxSTERNljnt_r2
      coupled_coordinates_function: SimmSpline: x=(-1.0472 -0.698968 -0.176623 0.067267 0.261799 0.349066 0.436332 0.523599 0.610865 0.698132 0.785398 0.872665 0.959931 1.0472 1.13446 1.22173 1.309 1.39626 1.48353 1.5708 1.65806 1.74533 1.8326 1.91986 2.00713 2.0944 2.21269 2.27313 2.35773 2.40855)
          y=(0.403171 0.403171 0.403171 0.404313 0.403171 0.403171 0.417134 0.429351 0.443314 0.455531 0.469494 0.481711 0.495674 0.506145 0.516617 0.527089 0.534071 0.542797 0.551524 0.558505 0.565487 0.572468 0.579449 0.589921 0.600393 0.6253 0.639446 0.653539 0.661698 0.668461)
    CoordinateCouplerConstraint aux7jnt_r1_con: isEnforced=false independent_coordinate_names=roll2
        dependent_coordinate_name=aux7jnt_r1
      coupled_coordinates_function: SimmSpline: x=(-1.74533 1.74533) y=(-0.23911 0.23911)
    CoordinateCouplerConstraint aux7jnt_r2_con: isEnforced=false independent_coordinate_names=yaw2
        dependent_coordinate_name=aux7jnt_r2
      coupled_coordinates_function: SimmSpline: x=(-1.74533 1.74533) y=(-0.328122 0.328122)
    CoordinateCouplerConstraint aux7jnt_r3_con: isEnforced=false independent_coordinate_names=pitch2
        dependent_coordinate_name=aux7jnt_r3
      coupled_coordinates_function: SimmSpline: x=(-1.74533 1.74533) y=(-0.326377 0.326377)
    CoordinateCouplerConstraint aux6jnt_r1_con: isEnforced=false independent_coordinate_names=roll2
        dependent_coordinate_name=aux6jnt_r1
      coupled_coordinates_function: SimmSpline: x=(-1.74533 1.74533) y=(-0.274017 0.274017)
    CoordinateCouplerConstraint aux6jnt_r2_con: isEnforced=false independent_coordinate_names=yaw2
        dependent_coordinate_name=aux6jnt_r2
      coupled_coordinates_function: SimmSpline: x=(-1.74533 1.74533) y=(-0.382227 0.382227)
    CoordinateCouplerConstraint aux6jnt_r3_con: isEnforced=false independent_coordinate_names=pitch2
        dependent_coordinate_name=aux6jnt_r3
      coupled_coordinates_function: SimmSpline: x=(-1.74533 1.74533) y=(-0.383972 0.383972)
    CoordinateCouplerConstraint aux5jnt_r1_con: isEnforced=false independent_coordinate_names=roll2
        dependent_coordinate_name=aux5jnt_r1
      coupled_coordinates_function: SimmSpline: x=(-1.74533 1.74533) y=(-0.376991 0.376991)
    CoordinateCouplerConstraint aux5jnt_r2_con: isEnforced=false independent_coordinate_names=yaw2
        dependent_coordinate_name=aux5jnt_r2
      coupled_coordinates_function: SimmSpline: x=(-1.74533 1.74533) y=(-0.382227 0.382227)
    CoordinateCouplerConstraint aux5jnt_r3_con: isEnforced=false independent_coordinate_names=pitch2
        dependent_coordinate_name=aux5jnt_r3
      coupled_coordinates_function: SimmSpline: x=(-1.74533 1.74533) y=(-0.383972 0.383972)
    CoordinateCouplerConstraint aux4jnt_r1_con: isEnforced=false independent_coordinate_names=roll2
        dependent_coordinate_name=aux4jnt_r1
      coupled_coordinates_function: SimmSpline: x=(-1.74533 1.74533) y=(-0.376991 0.376991)
    CoordinateCouplerConstraint aux4jnt_r2_con: isEnforced=false independent_coordinate_names=yaw2
        dependent_coordinate_name=aux4jnt_r2
      coupled_coordinates_function: SimmSpline: x=(-1.74533 1.74533) y=(-0.382227 0.382227)
    CoordinateCouplerConstraint aux4jnt_r3_con: isEnforced=false independent_coordinate_names=pitch2
        dependent_coordinate_name=aux4jnt_r3
      coupled_coordinates_function: SimmSpline: x=(-1.74533 1.74533) y=(-0.287979 0.287979)
    CoordinateCouplerConstraint aux3jnt_r1_con: isEnforced=false independent_coordinate_names=roll2
        dependent_coordinate_name=aux3jnt_r1
      coupled_coordinates_function: SimmSpline: x=(-1.74533 1.74533) y=(-0.342085 0.342085)
    CoordinateCouplerConstraint aux3jnt_r2_con: isEnforced=false independent_coordinate_names=yaw2
        dependent_coordinate_name=aux3jnt_r2
      coupled_coordinates_function: SimmSpline: x=(-1.74533 1.74533) y=(-0.164061 0.164061)
    CoordinateCouplerConstraint aux3jnt_r3_con: isEnforced=false independent_coordinate_names=pitch2
        dependent_coordinate_name=aux3jnt_r3
      coupled_coordinates_function: SimmSpline: x=(-1.74533 1.74533) y=(-0.191986 0.191986)
    CoordinateCouplerConstraint aux1jnt_r1_con: isEnforced=false independent_coordinate_names=roll1
        dependent_coordinate_name=aux1jnt_r1
      coupled_coordinates_function: SimmSpline: x=(-1.74533 1.74533) y=(-0.872665 0.872665)
    CoordinateCouplerConstraint aux1jnt_r2_con: isEnforced=false independent_coordinate_names=yaw1
        dependent_coordinate_name=aux1jnt_r2
      coupled_coordinates_function: SimmSpline: x=(-1.74533 1.74533) y=(-0.193732 0.193732)
    CoordinateCouplerConstraint aux1jnt_r3_con: isEnforced=false independent_coordinate_names=pitch1
        dependent_coordinate_name=aux1jnt_r3
      coupled_coordinates_function: SimmSpline: x=(-1.74533 1.74533) y=(-0.970403 0.970403)
  ForceSet:
    Thelen2003Muscle stern_mast: max_isometric_force=96.53 optimal_fiber_length=0.108 tendon_slack_length=0.056123
        pennation_angle_at_optimal=0.2617994 [radians]
      PathPoint P1: torso (-0.0007 0.3269 0.0096)
      PathPoint P2: skull (-0.0051 0.00693 0.0643)
    Thelen2003Muscle stern_mast_l: max_isometric_force=96.53 optimal_fiber_length=0.108 tendon_slack_length=0.056123
        pennation_angle_at_optimal=0.2617994
      PathPoint P1: torso (-0.0007 0.3269 -0.0096)
      PathPoint P2: skull (-0.0051 0.00693 -0.0643)
    Thelen2003Muscle cleid_mast: max_isometric_force=48.265 optimal_fiber_length=0.108 tendon_slack_length=0.035198
        pennation_angle_at_optimal=0.2617994
      PathPoint P1: rclavicle (0.00388 0.00542 0.0352)
      PathPoint P2: skull (-0.0051 0.00693 0.0643)
    Thelen2003Muscle cleid_mast_l: max_isometric_force=48.265 optimal_fiber_length=0.108 tendon_slack_length=0.035198
        pennation_angle_at_optimal=0.2617994
      PathPoint P1: lclavicle (0.004 0.005 -0.035)
      PathPoint P2: skull (-0.0051 0.00693 -0.0643)
    Thelen2003Muscle cleid_occ: max_isometric_force=48.265 optimal_fiber_length=0.108 tendon_slack_length=0.069467
        pennation_angle_at_optimal=0.2617994
      PathPoint P1: rclavicle (0.00388 0.00542 0.0352)
      PathPoint P2: skull (-0.035 0.023 0.0664)
    Thelen2003Muscle cleid_occ_l: max_isometric_force=48.265 optimal_fiber_length=0.108 tendon_slack_length=0.069467
        pennation_angle_at_optimal=0.2617994
      PathPoint P1: lclavicle (0.004 0.00548871 -0.035)
      PathPoint P2: skull (-0.035 0.023 -0.0664)
    Thelen2003Muscle scalenus_ant: max_isometric_force=72.03 optimal_fiber_length=0.042 tendon_slack_length=0.053421
        pennation_angle_at_optimal=0.1745329
      PathPoint P1: torso (-0.02139 0.33246 0.0529)
      PathPoint P2: cerv4 (0.00713 0.0079 0.02323)
    Thelen2003Muscle scalenus_ant_l: max_isometric_force=72.03 optimal_fiber_length=0.042 tendon_slack_length=0.053421
        pennation_angle_at_optimal=0.1745329
      PathPoint P1: torso (-0.02139 0.33246 -0.0529)
      PathPoint P2: cerv4 (0.00713 0.0079 -0.02323)
    Thelen2003Muscle scalenus_med: max_isometric_force=108.15 optimal_fiber_length=0.05 tendon_slack_length=0.061508
        pennation_angle_at_optimal=0.1745329
      PathPoint P1: torso (-0.03398 0.34333 0.0627)
      PathPoint P2: cerv3 (-0.00902 0.00981 0.02119)
    Thelen2003Muscle scalenus_med_l: max_isometric_force=108.15 optimal_fiber_length=0.05 tendon_slack_length=0.061508
        pennation_angle_at_optimal=0.1745329
      PathPoint P1: torso (-0.03398 0.34333 -0.0627)
      PathPoint P2: cerv3 (-0.00902 0.00981 -0.02119)
    Thelen2003Muscle scalenus_post: max_isometric_force=82.425 optimal_fiber_length=0.062 tendon_slack_length=0.072845
        pennation_angle_at_optimal=0.1745329
      PathPoint P1: torso (-0.03638 0.3127 0.1062)
      PathPoint P2: cerv5 (-0.0032 0.01371 0.0257)
    Thelen2003Muscle scalenus_post_l: max_isometric_force=82.425 optimal_fiber_length=0.062
        tendon_slack_length=0.072845 pennation_angle_at_optimal=0.1745329
      PathPoint P1: torso (-0.03638 0.3127 -0.1062)
      PathPoint P2: cerv5 (-0.0032 0.01371 -0.0257)
    Thelen2003Muscle long_cap_sklc4: max_isometric_force=46.648 optimal_fiber_length=0.038 tendon_slack_length=0.041297
        pennation_angle_at_optimal=0.08726646
      PathPoint P1: cerv4 (0.00652 0.01164 0.0242)
      PathPoint P2: cerv3 (0.01197 0.01009 0.01897)
      PathPoint P3: cerv2 (0.0172 0.00829 0.01477)
      PathPoint P4: cerv1 (0.05818 0.00309 0.01159)
      PathPoint P5: skull (0.0098 0.01596 0.0036)
    Thelen2003Muscle long_cap_sklc4_l: max_isometric_force=46.648 optimal_fiber_length=0.038
        tendon_slack_length=0.041297 pennation_angle_at_optimal=0.08726646
      PathPoint P1: cerv4 (0.00652 0.01164 -0.0242)
      PathPoint P2: cerv3 (0.01197 0.01009 -0.01897)
      PathPoint P3: cerv2 (0.0172 0.00829 -0.01477)
      PathPoint P4: cerv1 (0.05818 0.00309 -0.01159)
      PathPoint P5: skull (0.0098 0.01596 -0.0036)
    Thelen2003Muscle long_col_c1thx: max_isometric_force=13.398 optimal_fiber_length=0.08913
        tendon_slack_length=0.087519 pennation_angle_at_optimal=0.08726646
      PathPoint P1: spine (-0.04888 0.47634 0.0037)
      PathPoint P2: cerv7 (0.0232 0.0011 0.004)
      PathPoint P3: cerv6 (0.02314 0.00231 0.00402)
      PathPoint P4: cerv5 (0.02228 0.00228 0.0039)
      PathPoint P5: cerv4 (0.02205 0.00331 0.00379)
      PathPoint P6: cerv3 (0.02212 0.00603 0.00368)
      PathPoint P7: cerv2 (0.02122 0.00973 0.00356)
      PathPoint P8: cerv1 (0.05825 0.00482 0.0031)
    Thelen2003Muscle long_col_c1thx_l: max_isometric_force=13.398 optimal_fiber_length=0.08913
        tendon_slack_length=0.087519 pennation_angle_at_optimal=0.08726646
      PathPoint P1: spine (-0.04888 0.47634 -0.0037)
      PathPoint P2: cerv7 (0.0232 0.0011 -0.004)
      PathPoint P3: cerv6 (0.02314 0.00231 -0.00402)
      PathPoint P4: cerv5 (0.02228 0.00228 -0.0039)
      PathPoint P5: cerv4 (0.02205 0.00331 -0.00379)
      PathPoint P6: cerv3 (0.02212 0.00603 -0.00368)
      PathPoint P7: cerv2 (0.02122 0.00973 -0.00356)
      PathPoint P8: cerv1 (0.05825 0.00482 -0.0031)
    Thelen2003Muscle long_col_c1c5: max_isometric_force=13.398 optimal_fiber_length=0.03592
        tendon_slack_length=0.035239 pennation_angle_at_optimal=0.08726646
      PathPoint P1: cerv5 (0.00669 0.00889 0.0238)
      PathPoint P2: cerv4 (0.01121 0.00749 0.0207)
      PathPoint P3: cerv2 (0.01739 0.00159 0.01365)
      PathPoint P4: cerv1 (0.05725 0.00482 0.0062)
    Thelen2003Muscle long_col_c1c5_l: max_isometric_force=13.398 optimal_fiber_length=0.03592
        tendon_slack_length=0.035239 pennation_angle_at_optimal=0.08726646
      PathPoint P1: cerv5 (0.00669 0.00889 -0.0238)
      PathPoint P2: cerv4 (0.01121 0.00749 -0.0207)
      PathPoint P3: cerv2 (0.01739 0.00159 -0.01365)
      PathPoint P4: cerv1 (0.05725 0.00482 -0.0062)
    Thelen2003Muscle long_col_c5thx: max_isometric_force=13.398 optimal_fiber_length=0.05758
        tendon_slack_length=0.054794 pennation_angle_at_optimal=0.08726646
      PathPoint P1: spine (-0.04981 0.47596 0.0068)
      PathPoint P2: spine (-0.04825 0.49327 0.01022)
      PathPoint P3: spine (-0.04566 0.50763 0.01337)
      PathPoint P4: spine (-0.04466 0.5166 0.01508)
      PathPoint P5: spine (-0.04239 0.53083 0.01778)
      PathPoint P6: cerv7 (0.01111 0.00731 0.01979)
      PathPoint P7: cerv6 (0.00961 0.00713 0.02216)
      PathPoint P8: cerv5 (0.00669 0.00889 0.0238)
    Thelen2003Muscle long_col_c5thx_l: max_isometric_force=13.398 optimal_fiber_length=0.05758
        tendon_slack_length=0.054794 pennation_angle_at_optimal=0.08726646
      PathPoint P1: spine (-0.04981 0.47596 -0.0068)
      PathPoint P2: spine (-0.04825 0.49327 -0.01022)
      PathPoint P3: spine (-0.04566 0.50763 -0.01337)
      PathPoint P4: spine (-0.04466 0.5166 -0.01508)
      PathPoint P5: spine (-0.04239 0.53083 -0.01778)
      PathPoint P6: cerv7 (0.01111 0.00731 -0.01979)
      PathPoint P7: cerv6 (0.00961 0.00713 -0.02216)
      PathPoint P8: cerv5 (0.00669 0.00889 -0.0238)
    Thelen2003Muscle trap_cl: max_isometric_force=108.64 optimal_fiber_length=0.084 tendon_slack_length=0.119222
        pennation_angle_at_optimal=0.5235988
      PathPoint P1: rclavicle (-0.0294 0.0232 0.0869)
      PathPoint P2: skull (-0.08031 0.02604 0.01324)
    Thelen2003Muscle trap_cl_l: max_isometric_force=108.64 optimal_fiber_length=0.084 tendon_slack_length=0.119222
        pennation_angle_at_optimal=0.5235988
      PathPoint P1: lclavicle (-0.029 0.0229695 -0.087)
      PathPoint P2: skull (-0.08031 0.02604 -0.01324)
    Thelen2003Muscle trap_acr: max_isometric_force=527.73 optimal_fiber_length=0.092 tendon_slack_length=0.076582
        pennation_angle_at_optimal=0
      PathPoint P1: rscapula (-0.02379 -0.00916 -0.00736)
      PathPoint P2: cerv7 (-0.0477 0.019 0.00305)
    Thelen2003Muscle trap_acr_l: max_isometric_force=527.73 optimal_fiber_length=0.092 tendon_slack_length=0.076582
        pennation_angle_at_optimal=0
      PathPoint P1: lscapula (-0.02379 -0.00916 0.00736)
      PathPoint P2: cerv7 (-0.0477 0.019 -0.00305)
    Thelen2003Muscle splen_cap_sklc6: max_isometric_force=74.265 optimal_fiber_length=0.095
        tendon_slack_length=0.026013 pennation_angle_at_optimal=0
      PathPoint P1: cerv6 (-0.0486 0.01647 0.00305)
      PathPoint P2: skull (-0.06164 0.01918 0.044)
    Thelen2003Muscle splen_cap_sklc6_l: max_isometric_force=74.265 optimal_fiber_length=0.095
        tendon_slack_length=0.026013 pennation_angle_at_optimal=0
      PathPoint P1: cerv6 (-0.0486 0.01647 -0.00305)
      PathPoint P2: skull (-0.06164 0.01918 -0.044)
    Thelen2003Muscle splen_cap_sklthx: max_isometric_force=74.265 optimal_fiber_length=0.095
        tendon_slack_length=0.081861 pennation_angle_at_optimal=0
      PathPoint P1: spine (-0.10384 0.51202 0.003)
      PathPoint P2: skull (-0.04016 0.011 0.05423)
    Thelen2003Muscle splen_cap_sklthx_l: max_isometric_force=74.265 optimal_fiber_length=0.095
        tendon_slack_length=0.081861 pennation_angle_at_optimal=0
      PathPoint P1: spine (-0.10384 0.51202 -0.003)
      PathPoint P2: skull (-0.04016 0.011 -0.05423)
    Thelen2003Muscle splen_cerv_c3thx: max_isometric_force=74.265 optimal_fiber_length=0.095
        tendon_slack_length=0.108438 pennation_angle_at_optimal=0
      PathPoint P1: spine (-0.12848 0.43522 0.0041)
      PathPoint P2: cerv3 (-0.00787 0.01005 0.02365)
    Thelen2003Muscle splen_cerv_c3thx_l: max_isometric_force=74.265 optimal_fiber_length=0.095
        tendon_slack_length=0.108438 pennation_angle_at_optimal=0
      PathPoint P1: spine (-0.12848 0.43522 -0.0041)
      PathPoint P2: cerv3 (-0.00787 0.01005 -0.02365)
    Thelen2003Muscle semi_cap_sklc5: max_isometric_force=96.075 optimal_fiber_length=0.068 tendon_slack_length=0.046562
        pennation_angle_at_optimal=0.08726646
      PathPoint P1: cerv5 (-0.00931 0.01154 0.0235)
      PathPoint P2: skull (-0.07441 0.02 0.018)
    Thelen2003Muscle semi_cap_sklc5_l: max_isometric_force=96.075 optimal_fiber_length=0.068
        tendon_slack_length=0.046562 pennation_angle_at_optimal=0.08726646
      PathPoint P1: cerv5 (-0.00931 0.01154 -0.0235)
      PathPoint P2: skull (-0.07441 0.02 -0.018)
    Thelen2003Muscle semi_cap_sklthx: max_isometric_force=96.075 optimal_fiber_length=0.068 tendon_slack_length=0.06889
        pennation_angle_at_optimal=0.08726646
      PathPoint P1: spine (-0.08539 0.55032 0.0347)
      PathPoint P2: skull (-0.07671 0.02 0.0111)
    Thelen2003Muscle semi_cap_sklthx_l: max_isometric_force=96.075 optimal_fiber_length=0.068
        tendon_slack_length=0.06889 pennation_angle_at_optimal=0.08726646
      PathPoint P1: spine (-0.08539 0.55032 -0.0347)
      PathPoint P2: skull (-0.07671 0.02 -0.0111)
    Thelen2003Muscle semi_cerv_c3thx: max_isometric_force=96.075 optimal_fiber_length=0.068
        tendon_slack_length=0.027374 pennation_angle_at_optimal=0.08726646
      PathPoint P1: spine (-0.08896 0.52297 0.02607)
      PathPoint P2: cerv3 (-0.04064 -0.00322 0.0024)
    Thelen2003Muscle semi_cerv_c3thx_l: max_isometric_force=96.075 optimal_fiber_length=0.068
        tendon_slack_length=0.027374 pennation_angle_at_optimal=0.08726646
      PathPoint P1: spine (-0.08896 0.52297 -0.02607)
      PathPoint P2: cerv3 (-0.04064 -0.00322 -0.0024)
    Thelen2003Muscle levator_scap: max_isometric_force=114.45 optimal_fiber_length=0.113 tendon_slack_length=0.021875
        pennation_angle_at_optimal=0
      PathPoint P1: rscapula (-0.09749 -0.03624 -0.08146)
      PathPoint P2: cerv2 (-0.01186 0.00725 0.02121)
    Thelen2003Muscle levator_scap_l: max_isometric_force=114.45 optimal_fiber_length=0.113 tendon_slack_length=0.021875
        pennation_angle_at_optimal=0
      PathPoint P1: lscapula (-0.09749 -0.03624 0.08146)
      PathPoint P2: cerv2 (-0.01186 0.00725 -0.02121)
    Thelen2003Muscle longissi_cap_sklc6: max_isometric_force=46.77 optimal_fiber_length=0.07185
        tendon_slack_length=0.023946 pennation_angle_at_optimal=0
      PathPoint P1: cerv6 (-0.00817 0.01515 0.02759)
      PathPoint P2: skull (-0.0344 0.0051 0.055)
    Thelen2003Muscle longissi_cap_sklc6_l: max_isometric_force=46.77 optimal_fiber_length=0.07185
        tendon_slack_length=0.023946 pennation_angle_at_optimal=0
      PathPoint P1: cerv6 (-0.00817 0.01515 -0.02759)
      PathPoint P2: skull (-0.0344 0.0051 -0.055)
    Thelen2003Muscle longissi_cerv_c4thx: max_isometric_force=30.075 optimal_fiber_length=0.131813
        tendon_slack_length=0.042329 pennation_angle_at_optimal=0
      PathPoint P1: spine (-0.10994 0.44886 0.03215)
      PathPoint P2: spine (-0.10918 0.47538 0.03041)
      PathPoint P3: spine (-0.09978 0.49992 0.02919)
      PathPoint P4: spine (-0.0813 0.546 0.0279)
      PathPoint P5: cerv4 (-0.00709 0.01157 0.0261)
    Thelen2003Muscle longissi_cerv_c4thx_l: max_isometric_force=30.075 optimal_fiber_length=0.131813
        tendon_slack_length=0.042329 pennation_angle_at_optimal=0
      PathPoint P1: spine (-0.10994 0.44886 -0.03215)
      PathPoint P2: spine (-0.10918 0.47538 -0.03041)
      PathPoint P3: spine (-0.09978 0.49992 -0.02919)
      PathPoint P4: spine (-0.0813 0.546 -0.0279)
      PathPoint P5: cerv4 (-0.00709 0.01157 -0.0261)
    Thelen2003Muscle iliocost_cerv_c5rib: max_isometric_force=30.075 optimal_fiber_length=0.080895
        tendon_slack_length=0.025706 pennation_angle_at_optimal=0
      PathPoint P1: spine (-0.10349 0.50097 0.0533)
      PathPoint P2: spine (-0.08374 0.54938 0.04035)
      PathPoint P3: cerv5 (-0.0094 0.01258 0.026)
    Thelen2003Muscle iliocost_cerv_c5rib_l: max_isometric_force=30.075 optimal_fiber_length=0.080895
        tendon_slack_length=0.025706 pennation_angle_at_optimal=0
      PathPoint P1: spine (-0.10349 0.50097 -0.0533)
      PathPoint P2: spine (-0.08374 0.54938 -0.04035)
      PathPoint P3: cerv5 (-0.0094 0.01258 -0.026)
    Thelen2003Muscle rectcap_post_maj: max_isometric_force=48.93 optimal_fiber_length=0.037
        tendon_slack_length=0.022832 pennation_angle_at_optimal=0.08726646
      PathPoint P1: cerv2 (-0.03637 -0.00647 0.0024)
      PathPoint P2: skull (-0.0604 0.009 0.023)
    Thelen2003Muscle rectcap_post_maj_l: max_isometric_force=48.93 optimal_fiber_length=0.037
        tendon_slack_length=0.022832 pennation_angle_at_optimal=0.08726646
      PathPoint P1: cerv2 (-0.03637 -0.00647 -0.0024)
      PathPoint P2: skull (-0.0604 0.009 -0.023)
    Thelen2003Muscle rectcap_post_min: max_isometric_force=26.88 optimal_fiber_length=0.019
        tendon_slack_length=0.016897 pennation_angle_at_optimal=0.08726646
      PathPoint P1: cerv1 (7e-5 0.0009 0.0061)
      PathPoint P2: skull (-0.0667 0.009 0.0145)
    Thelen2003Muscle rectcap_post_min_l: max_isometric_force=26.88 optimal_fiber_length=0.019
        tendon_slack_length=0.016897 pennation_angle_at_optimal=0.08726646
      PathPoint P1: cerv1 (7e-5 0.0009 -0.0061)
      PathPoint P2: skull (-0.0667 0.009 -0.0145)
    Thelen2003Muscle obl_cap_sup: max_isometric_force=54.7575 optimal_fiber_length=0.025 tendon_slack_length=0.020417
        pennation_angle_at_optimal=0.1745329
      PathPoint P1: cerv1 (0.03505 0.00385 0.042)
      PathPoint P2: skull (-0.04758 0.00931 0.03818)
    Thelen2003Muscle obl_cap_sup_l: max_isometric_force=54.7575 optimal_fiber_length=0.025 tendon_slack_length=0.020417
        pennation_angle_at_optimal=0.1745329
      PathPoint P1: cerv1 (0.03505 0.00385 -0.042)
      PathPoint P2: skull (-0.04758 0.00931 -0.03818)
    Thelen2003Muscle obl_cap_inf: max_isometric_force=67.935 optimal_fiber_length=0.038 tendon_slack_length=0.015607
        pennation_angle_at_optimal=0
      PathPoint P1: cerv2 (-0.03637 -0.00647 0.00547)
      PathPoint P2: cerv1 (0.02996 0.00349 0.03791)
    Thelen2003Muscle obl_cap_inf_l: max_isometric_force=67.935 optimal_fiber_length=0.038 tendon_slack_length=0.015607
        pennation_angle_at_optimal=0
      PathPoint P1: cerv2 (-0.03637 -0.00647 -0.00547)
      PathPoint P2: cerv1 (0.02996 0.00349 -0.03791)
    Thelen2003Muscle supmult-C4-5-C2: max_isometric_force=21.21 optimal_fiber_length=0.024 tendon_slack_length=0.0215
        pennation_angle_at_optimal=0
      PathPoint P1: cerv2 (-0.03301 -0.01135 0.00489)
      PathPoint P2: cerv5 (-0.01341 0.01994 0.02297)
    Thelen2003Muscle supmult-C4-5-C2_l: max_isometric_force=21.21 optimal_fiber_length=0.024 tendon_slack_length=0.0215
        pennation_angle_at_optimal=0
      PathPoint P1: cerv2 (-0.03301 -0.01135 -0.00489)
      PathPoint P2: cerv5 (-0.01341 0.01994 -0.02297)
    Thelen2003Muscle supmult-C5-6-C2: max_isometric_force=33.27 optimal_fiber_length=0.0245 tendon_slack_length=0.0286
        pennation_angle_at_optimal=0
      PathPoint P1: cerv2 (-0.03395 -0.01049 0.00471)
      PathPoint P2: cerv6 (-0.01155 0.02078 0.02512)
    Thelen2003Muscle supmult-C5-6-C2_l: max_isometric_force=33.27 optimal_fiber_length=0.0245
        tendon_slack_length=0.0286 pennation_angle_at_optimal=0
      PathPoint P1: cerv2 (-0.03395 -0.01049 -0.00471)
      PathPoint P2: cerv6 (-0.01155 0.02078 -0.02512)
    Thelen2003Muscle supmult-C6-7-C2: max_isometric_force=28.185 optimal_fiber_length=0.0273 tendon_slack_length=0.0322
        pennation_angle_at_optimal=0
      PathPoint P1: cerv2 (-0.03398 -0.01046 0.0047)
      PathPoint P2: cerv7 (-0.01217 0.02111 0.02668)
    Thelen2003Muscle supmult-C6-7-C2_l: max_isometric_force=28.185 optimal_fiber_length=0.0273
        tendon_slack_length=0.0322 pennation_angle_at_optimal=0
      PathPoint P1: cerv2 (-0.03398 -0.01046 -0.0047)
      PathPoint P2: cerv7 (-0.01217 0.02111 -0.02668)
    Thelen2003Muscle supmult-T1-C4: max_isometric_force=96.075 optimal_fiber_length=0.068 tendon_slack_length=0.02737
        pennation_angle_at_optimal=0.08726646
      PathPoint P1: cerv4 (-0.03041 0.00081 0.00449)
      PathPoint P2: spine (-0.08373 0.54655 0.03185)
    Thelen2003Muscle supmult-T1-C4_l: max_isometric_force=96.075 optimal_fiber_length=0.068 tendon_slack_length=0.02737
        pennation_angle_at_optimal=0.08726646
      PathPoint P1: cerv4 (-0.03041 0.00081 -0.00449)
      PathPoint P2: spine (-0.08373 0.54655 -0.03185)
    Thelen2003Muscle supmult-T1-C5: max_isometric_force=96.075 optimal_fiber_length=0.068 tendon_slack_length=0.02737
        pennation_angle_at_optimal=0.08726646
      PathPoint P1: cerv5 (-0.03549 0.00983 0.00507)
      PathPoint P2: spine (-0.08255 0.54438 0.02985)
    Thelen2003Muscle supmult-T1-C5_l: max_isometric_force=96.075 optimal_fiber_length=0.068 tendon_slack_length=0.02737
        pennation_angle_at_optimal=0.08726646
      PathPoint P1: cerv5 (-0.03549 0.00983 -0.00507)
      PathPoint P2: spine (-0.08255 0.54438 -0.02985)
    Thelen2003Muscle supmult-T2-C6: max_isometric_force=96.075 optimal_fiber_length=0.068 tendon_slack_length=0.02737
        pennation_angle_at_optimal=0.08726646
      PathPoint P1: cerv6 (-0.03704 0.01113 0.00491)
      PathPoint P2: spine (-0.08879 0.5243 0.02764)
    Thelen2003Muscle supmult-T2-C6_l: max_isometric_force=96.075 optimal_fiber_length=0.068 tendon_slack_length=0.02737
        pennation_angle_at_optimal=0.08726646
      PathPoint P1: cerv6 (-0.03704 0.01113 -0.00491)
      PathPoint P2: spine (-0.08879 0.5243 -0.02764)
    Thelen2003Muscle deepmult-C4-5-C2: max_isometric_force=10.725 optimal_fiber_length=0.0203
        tendon_slack_length=0.0152 pennation_angle_at_optimal=0
      PathPoint P1: cerv2 (-0.02089 -0.00497 0.00599)
      PathPoint P2: cerv5 (-0.01317 0.02025 0.02096)
    Thelen2003Muscle deepmult-C4-5-C2_l: max_isometric_force=10.725 optimal_fiber_length=0.0203
        tendon_slack_length=0.0152 pennation_angle_at_optimal=0
      PathPoint P1: cerv2 (-0.02089 -0.00497 -0.00599)
      PathPoint P2: cerv5 (-0.01317 0.02025 -0.02096)
    Thelen2003Muscle deepmult-C5-6-C3: max_isometric_force=18.81 optimal_fiber_length=0.0185 tendon_slack_length=0.017
        pennation_angle_at_optimal=0
      PathPoint P1: cerv3 (-0.02136 -0.00324 0.00611)
      PathPoint P2: cerv6 (-0.01159 0.02103 0.0236)
    Thelen2003Muscle deepmult-C5-6-C3_l: max_isometric_force=18.81 optimal_fiber_length=0.0185
        tendon_slack_length=0.017 pennation_angle_at_optimal=0
      PathPoint P1: cerv3 (-0.02136 -0.00324 -0.00611)
      PathPoint P2: cerv6 (-0.01159 0.02103 -0.0236)
    Thelen2003Muscle deepmult-C6-7-C4: max_isometric_force=27.465 optimal_fiber_length=0.017 tendon_slack_length=0.0174
        pennation_angle_at_optimal=0
      PathPoint P1: cerv4 (-0.02161 -0.00016 0.0065)
      PathPoint P2: cerv7 (-0.01278 0.02103 0.02508)
    Thelen2003Muscle deepmult-C6-7-C4_l: max_isometric_force=27.465 optimal_fiber_length=0.017
        tendon_slack_length=0.0174 pennation_angle_at_optimal=0
      PathPoint P1: cerv4 (-0.02161 -0.00016 -0.0065)
      PathPoint P2: cerv7 (-0.01278 0.02103 -0.02508)
    Thelen2003Muscle deepmult-T1-C5: max_isometric_force=96.075 optimal_fiber_length=0.068 tendon_slack_length=0.02737
        pennation_angle_at_optimal=0.08726646
      PathPoint P1: cerv5 (-0.02781 0.01012 0.00578)
      PathPoint P2: spine (-0.08304 0.54709 0.03082)
    Thelen2003Muscle deepmult-T1-C5_l: max_isometric_force=96.075 optimal_fiber_length=0.068
        tendon_slack_length=0.02737 pennation_angle_at_optimal=0.08726646
      PathPoint P1: cerv5 (-0.02781 0.01012 -0.00578)
      PathPoint P2: spine (-0.08304 0.54709 -0.03082)
    Thelen2003Muscle deepmult-T1-C6: max_isometric_force=96.075 optimal_fiber_length=0.068 tendon_slack_length=0.02737
        pennation_angle_at_optimal=0.08726646
      PathPoint P1: cerv6 (-0.02756 0.01081 0.00579)
      PathPoint P2: spine (-0.08201 0.54389 0.02898)
    Thelen2003Muscle deepmult-T1-C6_l: max_isometric_force=96.075 optimal_fiber_length=0.068
        tendon_slack_length=0.02737 pennation_angle_at_optimal=0.08726646
      PathPoint P1: cerv6 (-0.02756 0.01081 -0.00579)
      PathPoint P2: spine (-0.08201 0.54389 -0.02898)
    Thelen2003Muscle deepmult-T2-C7: max_isometric_force=96.075 optimal_fiber_length=0.068 tendon_slack_length=0.02737
        pennation_angle_at_optimal=0.08726646
      PathPoint P1: cerv7 (-0.02697 0.01224 0.00579)
      PathPoint P2: spine (-0.08885 0.52408 0.02771)
    Thelen2003Muscle deepmult-T2-C7_l: max_isometric_force=96.075 optimal_fiber_length=0.068
        tendon_slack_length=0.02737 pennation_angle_at_optimal=0.08726646
      PathPoint P1: cerv7 (-0.02697 0.01224 -0.00579)
      PathPoint P2: spine (-0.08885 0.52408 -0.02771)
    Thelen2003Muscle deepmult-T2-T1: max_isometric_force=96.075 optimal_fiber_length=0.068 tendon_slack_length=0.02737
        pennation_angle_at_optimal=0.08726646
      PathPoint P1: spine (-0.08711 0.52213 0.02455)
      PathPoint P2: spine (-0.08485 0.52349 0.00389)
    Thelen2003Muscle deepmult-T2-T1_l: max_isometric_force=96.075 optimal_fiber_length=0.068
        tendon_slack_length=0.02737 pennation_angle_at_optimal=0.08726646
      PathPoint P1: spine (-0.08711 0.52213 -0.02455)
      PathPoint P2: spine (-0.08485 0.52349 -0.00389)
    CoordinateActuator spine_tilt: coordinate=spine_tilt optimal_force=1000
    CoordinateActuator spine_list: coordinate=spine_list optimal_force=1000
    CoordinateActuator spine_rotation: coordinate=spine_rotation optimal_force=1000
    CoordinateActuator arm_flex_r: coordinate=arm_flex_r optimal_force=1000
    CoordinateActuator arm_add_r: coordinate=arm_add_r optimal_force=1000
    CoordinateActuator arm_rot_r: coordinate=arm_rot_r optimal_force=1000
    CoordinateActuator arm_flex_l: coordinate=arm_flex_l optimal_force=1000
    CoordinateActuator arm_add_l: coordinate=arm_add_l optimal_force=1000
    CoordinateActuator arm_rot_l: coordinate=arm_rot_l optimal_force=1000
    CoordinateActuator elbow_flex_l: coordinate=elbow_flex_l optimal_force=100
    CoordinateActuator elbow_PronSup_l: coordinate=pro_sup_l optimal_force=100
    CoordinateActuator elbow_flex_r: coordinate=elbow_flex_r optimal_force=100
    CoordinateActuator elbow_PronSup_r: coordinate=pro_sup_r optimal_force=100
    CoordinateActuator hip_flexion_r: coordinate=hip_flexion_r optimal_force=500
    CoordinateActuator hip_adduction_r: coordinate=hip_adduction_r optimal_force=500
    CoordinateActuator hip_rotation_r: coordinate=hip_rotation_r optimal_force=100
    CoordinateActuator hip_flexion_l: coordinate=hip_flexion_r optimal_force=500
    CoordinateActuator hip_adduction_l: coordinate=hip_adduction_l optimal_force=500
    CoordinateActuator hip_rotation_l: coordinate=hip_rotation_l optimal_force=100
    CoordinateActuator knee_angle_r: coordinate=knee_angle_r optimal_force=100
    CoordinateActuator knee_angle_l: coordinate=knee_angle_l optimal_force=500
    CoordinateActuator ankle_angle_r: coordinate=ankle_angle_r optimal_force=500
    CoordinateActuator ankle_angle_l: coordinate=ankle_angle_l optimal_force=100
    ObjectGroup sterno: members=(cleid_mast cleid_mast_l cleid_occ cleid_occ_l stern_mast stern_mast_l)
    ObjectGroup flexion: members=(cleid_mast cleid_mast_l cleid_occ cleid_occ_l long_cap_sklc4 long_cap_sklc4_l long_col_c1c5 long_col_c1c5_l long_col_c1thx long_col_c1thx_l long_col_c5thx long_col_c5thx_l scalenus_ant scalenus_ant_l stern_mast stern_mast_l)
    ObjectGroup rotation_contra: members=(cleid_mast cleid_mast_l cleid_occ cleid_occ_l long_cap_sklc4 long_cap_sklc4_l long_col_c1c5 long_col_c1c5_l obl_cap_sup obl_cap_sup_l semi_cap_sklc5 semi_cap_sklc5_l semi_cap_sklthx semi_cap_sklthx_l semi_cerv_c3thx semi_cerv_c3thx_l stern_mast stern_mast_l trap_acr trap_acr_l trap_cl trap_cl_l)
    ObjectGroup lat_bending: members=(cleid_mast cleid_mast_l cleid_occ cleid_occ_l deepmult-C4-5-C2 deepmult-C4-5-C2_l deepmult-C5-6-C3 deepmult-C5-6-C3_l deepmult-C6-7-C4 deepmult-C6-7-C4_l deepmult-T1-C5 deepmult-T1-C5_l deepmult-T1-C6 deepmult-T1-C6_l deepmult-T2-C7 deepmult-T2-C7_l deepmult-T2-T1 deepmult-T2-T1_l iliocost_cerv_c5rib iliocost_cerv_c5rib_l levator_scap levator_scap_l long_cap_sklc4 long_cap_sklc4_l long_col_c1c5 long_col_c1c5_l long_col_c1thx long_col_c1thx_l long_col_c5thx long_col_c5thx_l longissi_cap_sklc6 longissi_cap_sklc6_l longissi_cerv_c4thx longissi_cerv_c4thx_l obl_cap_inf obl_cap_inf_l obl_cap_sup obl_cap_sup_l rectcap_post_maj rectcap_post_maj_l scalenus_ant scalenus_ant_l scalenus_med scalenus_med_l scalenus_post scalenus_post_l semi_cap_sklc5 semi_cap_sklc5_l semi_cap_sklthx semi_cap_sklthx_l semi_cerv_c3thx semi_cerv_c3thx_l splen_cap_sklc6 splen_cap_sklc6_l splen_cap_sklthx splen_cap_sklthx_l splen_cerv_c3thx splen_cerv_c3thx_l stern_mast stern_mast_l supmult-C4-5-C2 supmult-C4-5-C2_l supmult-C5-6-C2 supmult-C5-6-C2_l supmult-C6-7-C2 supmult-C6-7-C2_l supmult-T1-C4 supmult-T1-C4_l supmult-T1-C5 supmult-T1-C5_l supmult-T2-C6 supmult-T2-C6_l trap_acr trap_acr_l trap_cl trap_cl_l)
    ObjectGroup scalenus: members=(scalenus_ant scalenus_ant_l scalenus_med scalenus_med_l scalenus_post scalenus_post_l)
    ObjectGroup extension: members=(deepmult-C4-5-C2 deepmult-C4-5-C2_l deepmult-C5-6-C3 deepmult-C5-6-C3_l deepmult-C6-7-C4 deepmult-C6-7-C4_l deepmult-T1-C5 deepmult-T1-C5_l deepmult-T1-C6 deepmult-T1-C6_l deepmult-T2-C7 deepmult-T2-C7_l deepmult-T2-T1 deepmult-T2-T1_l iliocost_cerv_c5rib iliocost_cerv_c5rib_l levator_scap levator_scap_l longissi_cap_sklc6 longissi_cap_sklc6_l longissi_cerv_c4thx longissi_cerv_c4thx_l obl_cap_inf obl_cap_inf_l obl_cap_sup obl_cap_sup_l rectcap_post_maj rectcap_post_maj_l rectcap_post_min rectcap_post_min_l scalenus_med scalenus_med_l scalenus_post scalenus_post_l semi_cap_sklc5 semi_cap_sklc5_l semi_cap_sklthx semi_cap_sklthx_l semi_cerv_c3thx semi_cerv_c3thx_l splen_cap_sklc6 splen_cap_sklc6_l splen_cap_sklthx splen_cap_sklthx_l splen_cerv_c3thx splen_cerv_c3thx_l supmult-C4-5-C2 supmult-C4-5-C2_l supmult-C5-6-C2 supmult-C5-6-C2_l supmult-C6-7-C2 supmult-C6-7-C2_l supmult-T1-C4 supmult-T1-C4_l supmult-T1-C5 supmult-T1-C5_l supmult-T2-C6 supmult-T2-C6_l trap_acr trap_acr_l trap_cl trap_cl_l)
    ObjectGroup rotation_ipsi: members=(iliocost_cerv_c5rib iliocost_cerv_c5rib_l levator_scap levator_scap_l long_col_c5thx long_col_c5thx_l longissi_cap_sklc6 longissi_cap_sklc6_l longissi_cerv_c4thx longissi_cerv_c4thx_l obl_cap_inf obl_cap_inf_l rectcap_post_maj rectcap_post_maj_l scalenus_med scalenus_med_l scalenus_post scalenus_post_l splen_cap_sklc6 splen_cap_sklc6_l splen_cap_sklthx splen_cap_sklthx_l splen_cerv_c3thx splen_cerv_c3thx_l)
    ObjectGroup longus: members=(long_cap_sklc4 long_cap_sklc4_l long_col_c1c5 long_col_c1c5_l long_col_c1thx long_col_c1thx_l long_col_c5thx long_col_c5thx_l)
    ObjectGroup trapezius: members=(trap_acr trap_acr_l trap_cl trap_cl_l)
    ObjectGroup splenius: members=(splen_cap_sklc6 splen_cap_sklc6_l splen_cap_sklthx splen_cap_sklthx_l splen_cerv_c3thx splen_cerv_c3thx_l)
    ObjectGroup semispinalis: members=(semi_cap_sklc5 semi_cap_sklc5_l semi_cap_sklthx semi_cap_sklthx_l semi_cerv_c3thx semi_cerv_c3thx_l)
    ObjectGroup levator_scap: members=(levator_scap levator_scap_l)
    ObjectGroup erectorspinae: members=(iliocost_cerv_c5rib iliocost_cerv_c5rib_l longissi_cap_sklc6 longissi_cap_sklc6_l longissi_cerv_c4thx longissi_cerv_c4thx_l)
    ObjectGroup suboccipital: members=(obl_cap_inf obl_cap_inf_l obl_cap_sup obl_cap_sup_l rectcap_post_maj rectcap_post_maj_l rectcap_post_min rectcap_post_min_l)
    ObjectGroup multifidus: members=(deepmult-C4-5-C2 deepmult-C4-5-C2_l deepmult-C5-6-C3 deepmult-C5-6-C3_l deepmult-C6-7-C4 deepmult-C6-7-C4_l deepmult-T1-C5 deepmult-T1-C5_l deepmult-T1-C6 deepmult-T1-C6_l deepmult-T2-C7 deepmult-T2-C7_l deepmult-T2-T1 deepmult-T2-T1_l supmult-C4-5-C2 supmult-C4-5-C2_l supmult-C5-6-C2 supmult-C5-6-C2_l supmult-C6-7-C2 supmult-C6-7-C2_l supmult-T1-C4 supmult-T1-C4_l supmult-T1-C5 supmult-T1-C5_l supmult-T2-C6 supmult-T2-C6_l)
  MarkerSet:
    Marker Nose: skull (0.117995 0.0128447 0) fixed=true
    Marker REar: skull (0.009103971 0.04690467 0.08505545) fixed=true
    Marker C7_study: cerv7 (-0.0740203 -0.0011907 0.00246084)
    Marker L_shoulder_study: torso (0 0.418 -0.142)
    Marker L_lelbow_study: humerus_l (0.015 -0.28 -0.04) fixed=true
    Marker r_shoulder_study: torso (0 0.418 0.142)
    Marker r_lelbow_study: humerus_r (0.015 -0.28 0.04) fixed=true
    Marker L.PSIS_study: pelvis (-0.154 0.025 -0.05)
    Marker r.PSIS_study: pelvis (-0.154 0.025 0.05)
    Marker r_knee_study: femur_r (0.008 -0.404 0.055)
    Marker r_mknee_study: femur_r (0.011 -0.401 -0.055)
    Marker r_thigh1_study: femur_r (0.09 -0.15 0.07)
    Marker r_thigh2_study: femur_r (0.055 -0.25 0.085)
    Marker r_thigh3_study: femur_r (-0.02 -0.14 0.1)
    Marker r_sh1_study: tibia_r (0 -0.115 0.07)
    Marker r_sh2_study: tibia_r (0.026 -0.23 0.08)
    Marker r_sh3_study: tibia_r (-0.05 -0.22 0.08)
    Marker r_ankle_study: tibia_r (-0.02 -0.385 0.053)
    Marker r_mankle_study: tibia_r (0.006 -0.38 -0.038)
    Marker r_calc_study: calcn_r (-0.0321615 0.0325693 -0.0111695)
    Marker r_toe_study: calcn_r (0.186844 0.00836653 0.00526621)
    Marker r_5meta_study: calcn_r (0.14 0.005 0.065)
    Marker L_knee_study: femur_l (0.008 -0.404 -0.055)
    Marker L_mknee_study: femur_l (0.011 -0.401 0.055)
    Marker L_thigh1_study: femur_l (0.09 -0.15 -0.07)
    Marker L_thigh2_study: femur_l (0.055 -0.25 -0.085)
    Marker L_thigh3_study: femur_l (-0.02 -0.14 -0.1)
    Marker L_sh1_study: tibia_l (0 -0.115 -0.07)
    Marker L_sh2_study: tibia_l (0.026 -0.23 -0.08)
    Marker L_sh3_study: tibia_l (-0.05 -0.22 -0.08)
    Marker L_ankle_study: tibia_l (-0.02 -0.385 -0.053)
    Marker L_mankle_study: tibia_l (0.006 -0.38 0.038)
    Marker L_calc_study: calcn_l (-0.0321615 0.0325693 0.0111695)
    Marker L_toe_study: calcn_l (0.186844 0.00836653 -0.00526621)
    Marker L_5meta_study: calcn_l (0.14 0.005 -0.065)
    Marker r_melbow_study: humerus_r (0.00225 -0.286 -0.05) fixed=true
    Marker L_melbow_study: humerus_l (0.00225 -0.286 0.05) fixed=true
    Marker r.ASIS_study: pelvis (0.028 0.01 0.128)
    Marker L.ASIS_study: pelvis (0.028 0.01 -0.128)
    Marker r_mwrist_study: radius_r (-0.022 -0.225 -0.022) fixed=true
    Marker L_mwrist_study: radius_l (-0.022 -0.225 0.022) fixed=true
    Marker L_lwrist_study: radius_l (0.0005 -0.225 -0.05) fixed=true
    Marker LEar: skull (0.00910397 0.0469047 -0.0850554) fixed=true
    Marker REye: skull (0.09363014 0.04690447 0.03200094) fixed=true
    Marker LEye: skull (0.0936301 0.0469045 -0.0320009) fixed=true
    Marker r_lwrist_study: radius_r (0.0005 -0.225 0.05) fixed=true
    Marker RHJC_study: pelvis (-0.056276 -0.07849 0.07726)
    Marker LHJC_study: pelvis (-0.056276 -0.07849 -0.07726)
  ProbeSet:
    JointInternalPowerProbe Probe_0
