# OpenSim document version 40500
MarkerSet:
  Marker Nose: skull (0.117995 0.0128447 0) fixed=true
  Marker REar: skull (0.009103971 0.04690467 0.08505545) fixed=true
  Marker C7_study: cerv7 (-0.0740203 -0.0011907 0.00246084)
  Marker L_shoulder_study: torso (0 0.418 -0.142)
  Marker L_lelbow_study: humerus_l (0.015 -0.28 -0.04) fixed=true
  Marker r_shoulder_study: torso (0 0.418 0.142)
  Marker r_lelbow_study: humerus_r (0.015 -0.28 0.04) fixed=true
  Marker L.PSIS_study: pelvis (-0.154 0.025 -0.05)
  Marker r.PSIS_study: pelvis (-0.154 0.025 0.05)
  Marker r_knee_study: femur_r (0.008 -0.404 0.055)
  Marker r_mknee_study: femur_r (0.011 -0.401 -0.055)
  Marker r_thigh1_study: femur_r (0.09 -0.15 0.07)
  Marker r_thigh2_study: femur_r (0.055 -0.25 0.085)
  Marker r_thigh3_study: femur_r (-0.02 -0.14 0.1)
  Marker r_sh1_study: tibia_r (0 -0.115 0.07)
  Marker r_sh2_study: tibia_r (0.026 -0.23 0.08)
  Marker r_sh3_study: tibia_r (-0.05 -0.22 0.08)
  Marker r_ankle_study: tibia_r (-0.02 -0.385 0.053)
  Marker r_mankle_study: tibia_r (0.006 -0.38 -0.038)
  Marker r_calc_study: calcn_r (-0.0321615 0.0325693 -0.0111695)
  Marker r_toe_study: calcn_r (0.186844 0.00836653 0.00526621)
  Marker r_5meta_study: calcn_r (0.14 0.005 0.065)
  Marker L_knee_study: femur_l (0.008 -0.404 -0.055)
  Marker L_mknee_study: femur_l (0.011 -0.401 0.055)
  Marker L_thigh1_study: femur_l (0.09 -0.15 -0.07)
  Marker L_thigh2_study: femur_l (0.055 -0.25 -0.085)
  Marker L_thigh3_study: femur_l (-0.02 -0.14 -0.1)
  Marker L_sh1_study: tibia_l (0 -0.115 -0.07)
  Marker L_sh2_study: tibia_l (0.026 -0.23 -0.08)
  Marker L_sh3_study: tibia_l (-0.05 -0.22 -0.08)
  Marker L_ankle_study: tibia_l (-0.02 -0.385 -0.053)
  Marker L_mankle_study: tibia_l (0.006 -0.38 0.038)
  Marker L_calc_study: calcn_l (-0.0321615 0.0325693 0.0111695)
  Marker L_toe_study: calcn_l (0.186844 0.00836653 -0.00526621)
  Marker L_5meta_study: calcn_l (0.14 0.005 -0.065)
  Marker r_melbow_study: humerus_r (0.00225 -0.286 -0.05) fixed=true
  Marker L_melbow_study: humerus_l (0.00225 -0.286 0.05) fixed=true
  Marker r.ASIS_study: pelvis (0.028 0.01 0.128)
  Marker L.ASIS_study: pelvis (0.028 0.01 -0.128)
  Marker r_mwrist_study: radius_r (-0.022 -0.225 -0.022) fixed=true
  Marker L_mwrist_study: radius_l (-0.022 -0.225 0.022) fixed=true
  Marker L_lwrist_study: radius_l (0.0005 -0.225 -0.05) fixed=true
  Marker LEar: skull (0.00910397 0.0469047 -0.0850554) fixed=true
  Marker REye: skull (0.09363014 0.04690447 0.03200094) fixed=true
  Marker LEye: skull (0.0936301 0.0469045 -0.0320009) fixed=true
  Marker r_lwrist_study: radius_r (0.0005 -0.225 0.05) fixed=true
  Marker RHJC_study: pelvis (-0.056276 -0.07849 0.07726)
  Marker LHJC_study: pelvis (-0.056276 -0.07849 -0.07726)
