# OpenSim document version 40500
ScaleTool LaiUhlrich2022:
  mass: 9 [kg]
  height: 0.9
  age: -1
  ModelScaler:
    apply: true
    scaling_order: measurements
    marker_file: keypoints_augmented.trc
    time_range: 0 0.5
    preserve_mass_distribution: true
    MeasurementSet:
      Measurement torsoXY: apply=true
        MarkerPair: markers=(RShoulder RHip)
        MarkerPair: markers=(LShoulder LHip)
        MarkerPair: markers=(Neck RHip)
        MarkerPair: markers=(Neck LHip)
        BodyScale pelvis: axes=(X Y)
        BodyScale spine: axes=(X Y)
        BodyScale lclavicle: axes=(X Y)
        BodyScale lscapula: axes=(X Y)
        BodyScale torso: axes=(X Y)
        BodyScale cerv7: axes=(X Y)
        BodyScale cerv6: axes=(X Y)
        BodyScale cerv5: axes=(X Y)
        BodyScale cerv4: axes=(X Y)
        BodyScale cerv3: axes=(X Y)
        BodyScale cerv2: axes=(X Y)
        BodyScale cerv1: axes=(X Y)
        BodyScale skull: axes=(X Y)
        BodyScale jaw: axes=(X Y)
        BodyScale rclavicle: axes=(X Y)
        BodyScale rscapula: axes=(X Y)
      Measurement torsoZ: apply=true
        MarkerPair: markers=(RShoulder r_lelbow_study)
        MarkerPair: markers=(RShoulder r_melbow_study)
        MarkerPair: markers=(LShoulder L_lelbow_study)
        MarkerPair: markers=(LShoulder L_melbow_study)
        BodyScale pelvis: axes=Z
        BodyScale spine: axes=Z
        BodyScale lclavicle: axes=Z
        BodyScale lscapula: axes=Z
        BodyScale torso: axes=Z
        BodyScale cerv7: axes=Z
        BodyScale cerv6: axes=Z
        BodyScale cerv5: axes=Z
        BodyScale cerv4: axes=Z
        BodyScale cerv3: axes=Z
        BodyScale cerv2: axes=Z
        BodyScale cerv1: axes=Z
        BodyScale skull: axes=Z
        BodyScale jaw: axes=Z
        BodyScale rclavicle: axes=Z
        BodyScale rscapula: axes=Z
      Measurement humerus: apply=true
        MarkerPair: markers=(RShoulder r_lelbow_study)
        MarkerPair: markers=(RShoulder r_melbow_study)
        MarkerPair: markers=(LShoulder L_lelbow_study)
        MarkerPair: markers=(LShoulder L_melbow_study)
        BodyScale humerus_l: axes=(X Y Z)
        BodyScale humerus_r: axes=(X Y Z)
      Measurement radius: apply=true
        MarkerPair: markers=(r_lwrist_study r_lelbow_study)
        MarkerPair: markers=(r_mwrist_study r_melbow_study)
        MarkerPair: markers=(L_lwrist_study L_lelbow_study)
        MarkerPair: markers=(L_mwrist_study L_melbow_study)
        BodyScale ulna_l: axes=(X Y Z)
        BodyScale radius_l: axes=(X Y Z)
        BodyScale hand_l: axes=(X Y Z)
        BodyScale ulna_r: axes=(X Y Z)
        BodyScale radius_r: axes=(X Y Z)
        BodyScale hand_r: axes=(X Y Z)
      Measurement pelvis: apply=false
        MarkerPair: markers=(RHip LHip)
  MarkerPlacer:
    apply: false
    time_range: 0 0.5
    max_marker_movement: -1
    IKTaskSet:
      IKMarkerTask Nose: apply=true weight=5
      IKMarkerTask Neck: apply=true weight=20
      IKMarkerTask LShoulder: apply=true weight=5
      IKMarkerTask L_lelbow_study: apply=true weight=1
      IKMarkerTask RShoulder: apply=true weight=5
      IKMarkerTask r_lelbow_study: apply=true weight=1
      IKMarkerTask r_melbow_study: apply=true weight=1
      IKMarkerTask L_melbow_study: apply=true weight=1
      IKMarkerTask r_mwrist_study: apply=true weight=5
      IKMarkerTask L_mwrist_study: apply=true weight=5
      IKMarkerTask L_lwrist_study: apply=true weight=5
      IKMarkerTask REye: apply=true weight=5
      IKMarkerTask LEye: apply=true weight=5
      IKMarkerTask r_lwrist_study: apply=true weight=5
      IKMarkerTask RHip: apply=true weight=10
      IKMarkerTask LHip: apply=true weight=10
      IKCoordinateTask [values shared by the 6 below unless stated]: apply=true weight=0.1 value_type=manual_value
          value=0
      IKCoordinateTask spine_tilt
      IKCoordinateTask spine_list
      IKCoordinateTask spine_rotation
      IKCoordinateTask pitch1
      IKCoordinateTask roll1
      IKCoordinateTask yaw1
